<?xml version="1.0" encoding="UTF-8"?>
<!--	author: Ysop https://forum.flightgear.org/memberlist.phpmode=viewprofile&u=22709 -->
<!--	reference documents: NASA TN D-6238 		-->
<!--	plus a bit of work....				-->

<!--- #########################################  -->
<!--- ###########  work in progress  ##########  -->
<!--- #########################################  -->


<aerodynamics>

	<function name="aero/function/both-feathered">
		<and>
			<ge>
				<p>propulsion/engine[0]/feather-norm</p>
				<v>0.5</v>
			</ge>
			<ge>
				<p>propulsion/engine[1]/feather-norm</p>
				<value>0.5</value>
			</ge>
		</and>
	</function>

	<function name="aero/function/thrust-coeff-tc">
		<ifthen>
			<or>
				<gt> <property>aero/qbar-psf</property> <v>0</v> </gt>
				<lt> <property>aero/qbar-psf</property> <v>0</v> </lt>
			</or>
			<quotient>
				<sum>
					<p>propulsion/engine[0]/thrust-lbs</p>
					<p>propulsion/engine[1]/thrust-lbs</p>
				</sum>
				<product>
					<property>aero/qbar-psf</property>
					<property>metrics/Sw-sqft</property>
				</product>
			</quotient>
 			<v>0</v>
		</ifthen>
	</function>

<!--	<property>aero/function/runtimeaircraftmodel</property> -->

	<!-- 0: C310P  1:C310A -->

	<function name="aero/function/modelfactor_cnbeta">
	<ifthen>
		<eq><p>aero/function/runtimeaircraftmodel</p> <v>1</v></eq>
		<v>0.96</v> <!-- * -->
		<v>1</v>
	</ifthen>
	</function>

	<function name="aero/function/modelfactor_cnr">
	<ifthen>
		<eq><p>aero/function/runtimeaircraftmodel</p> <v>1</v></eq>
		<v>0.9</v> <!-- * -->
		<v>1</v>
	</ifthen>
	</function>


	<function name="aero/function/modelfactor_clbeta">
	<ifthen>
		<eq><p>aero/function/runtimeaircraftmodel</p> <v>1</v></eq>
		<v>0.62</v> <!-- * -->
		<v>1</v>
	</ifthen>
	</function>

	<function name="aero/model_dragaddition">
	<ifthen>
		<eq><p>aero/function/runtimeaircraftmodel</p> <v>1</v></eq>
		<v>0</v> <!-- * -->
		<v>0</v>
	</ifthen>
	</function>

	<property>aero/function/runtime_ice</property>
<!--	<property>aero/function/ct_fullthrust</property> -->
	<property>aero/function/windmill_limit</property>

	<function name="aero/function/thrust-state">
		<ifthen>
		<and>
			<ge>
				<p>propulsion/engine[0]/fuel-flow-rate-gph</p>
				<p>aero/function/windmill_limit</p>
			</ge>
			<ge>
				<p>propulsion/engine[1]/fuel-flow-rate-gph</p>
				<p>aero/function/windmill_limit</p>
			</ge>
		</and>
		<p>aero/function/thrust-coeff-tc</p>
		<ifthen>
		<and>
			<lt>
				<p>propulsion/engine[0]/fuel-flow-rate-gph</p>
				<p>aero/function/windmill_limit</p>
			</lt>
			<ge>
				<p>propulsion/engine[1]/fuel-flow-rate-gph</p>
				<p>aero/function/windmill_limit</p>
			</ge>
		</and>
		<v>-1</v>
		<ifthen>
		<and>
			<ge>
				<p>propulsion/engine[0]/fuel-flow-rate-gph</p>
				<p>aero/function/windmill_limit</p>
			</ge>
			<lt>
				<p>propulsion/engine[1]/fuel-flow-rate-gph</p>
				<p>aero/function/windmill_limit</p>
			</lt>
		</and>
		<v>-2</v>
		<ifthen>
		<and>
			<lt>
				<p>propulsion/engine[0]/fuel-flow-rate-gph</p>
				<p>aero/function/windmill_limit</p>
			</lt>
			<lt>
				<p>propulsion/engine[1]/fuel-flow-rate-gph</p>
				<p>aero/function/windmill_limit</p>
			</lt>
			<p>aero/function/both-feathered</p>
		</and>
		<v>-4</v>
		<v>-3</v>
		</ifthen>
		</ifthen>
		</ifthen>
		</ifthen>
	</function>

<!-- replaced with thrust balance
	<function name="aero/function/asymthrust-norm">
		<ifthen>
		<eq><p>aero/function/thrust-state</p><v>-1</v></eq>
			<quotient>
				<p>propulsion/engine[1]/thrust-coefficient</p>
				<p>aero/function/ct_fullthust</p>
			</quotient>
		<ifthen>
		<eq><p>aero/function/thrust-state</p><v>-2</v></eq>
			<quotient>
				<p>propulsion/engine[0]/thrust-coefficient</p>
				<p>aero/function/ct_fullthust</p>
			</quotient>
		<v>0</v>
		</ifthen>
		</ifthen>
	</function>
-->

	<function name="aero/function/power-balance"> <!-- left:neg. right:pos +-1=max -->
		<quotient>
			<difference>
				<p>propulsion/engine[1]/power-hp</p>
				<p>propulsion/engine[0]/power-hp</p>
			</difference>
			<v>246</v>
		</quotient>
	</function>

	<function name="aero/function/thrust-state-asym"> <!-- deactivates symmetric parts -->
		<ifthen>
			<le><p>aero/function/power-balance</p><v>-0.1</v></le> <!-- * -->
			<v>-1</v>
			<ifthen>
				<gt><p>aero/function/power-balance</p><v>0.1</v></gt>
				<v>1</v>
				<v>0</v>
			</ifthen>
		</ifthen>
	</function>

	<function name="aero/function/thrust-state-sym">	<!-- deactivates asymmetric parts -->
		<ifthen>
		<eq><p>aero/function/thrust-state-asym</p><v>0</v></eq>
		<v>1</v>
		<v>0</v>
		</ifthen>
	</function>

	<function name="aero/function/easymode_cmq">
		<ifthen>
			<p>/sim/realism/realistic-fdm</p>
			<v>1</v>
			<v>1.5</v>
		</ifthen>
	</function>


	<function name="aero/function/easymode_clp">
		<ifthen>
			<p>/sim/realism/realistic-fdm</p>
			<v>1</v>
			<v>2</v>
		</ifthen>
	</function>

	<function name="aero/function/easymode_clb">
		<ifthen>
			<p>/sim/realism/realistic-fdm</p>
			<v>1</v>
			<v>2</v>
		</ifthen>
	</function>


	<function name="aero/function/easymode_cnb">
		<ifthen>
			<p>/sim/realism/realistic-fdm</p>
			<v>1</v>
			<v>1.5</v>
		</ifthen>
	</function>

	<function name="aero/function/easymode_cnr">
		<ifthen>
			<p>/sim/realism/realistic-fdm</p>
			<v>1</v>
			<v>1.5</v>
		</ifthen>
	</function>


	<function name="aero/function/kCLge">
		<description>Change in lift due to ground effect</description>
		<table>
			<independentVar>aero/h_b-cg-ft</independentVar>
			<tableData>
				0.139	1.178
				0.278	1.067
				0.556	1.020
				1.000	1.006
				1.100	1.000
			</tableData>
		</table>
	</function>

	<function name="aero/function/kCDge">
		<description>Change in drag due to ground effect</description>
		<table>
			<independentVar>aero/h_b-cg-ft</independentVar>
			<tableData>
				0.139	0.864
				0.278	0.931
				0.556	0.973
				1.000	0.99
				1.100	1.000
			</tableData>
		</table>
	</function>

	<axis name="LIFT">
		<function name="aero/force/Lift_alpha_sym">
			<description>Lift due to alpha symmetric state</description>
			<ifthen>
				<eq><p>aero/function/thrust-state-sym</p><v>1</v></eq>
				<product>
					<property>aero/qbar-psf</property>
					<property>metrics/Sw-sqft</property>
					<property>aero/function/kCLge</property>
					<table>
						<independentVar	lookup="row">aero/alpha-deg</independentVar>
						<independentVar	lookup="column">fcs/flap-pos-deg</independentVar>
						<independentVar	lookup="table">aero/function/thrust-state</independentVar>
						<tableData	breakPoint="-2">
					0	15	35
-4.0628	-0.3248	-0.0794	0.0301
-2.0555	-0.1407	0.1106	0.2235
-0.6496	-0.0086	0.2517	0.3636
1.9235	0.2425	0.4976	0.6190
3.3544	0.3771	0.6418	0.7616
4.4026	0.4771	0.7410	0.8586
6.1147	0.6447	0.9064	1.0268
8.0338	0.8226	1.0934	1.2143
9.4314	0.9550	1.2327	1.3526
11.3170	1.1468	1.3846	1.5386
12.3819	1.2333	1.4378	1.6365
14.4555	1.3389	1.4948	1.6355
16.0247	1.4003	1.5122	1.6336
18.2590	1.4711	1.4961	1.6070
19.1815	1.4141	1.4350	1.5468
20.1582	1.3386	1.3630	1.4638
21.0041	1.3234	1.3718	1.4126
23.3398	1.3363	1.3833	1.4168
24.4800	1.3507	1.3855	1.4275
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				</tableData>
				<tableData	breakPoint="-1">
					0	15	35
-4.1510	-0.3257	-0.1320	0.0862
-2.1350	-0.1250	0.0565	0.2735
-0.5860	0.0176	0.2040	0.4304
0.5960	0.1394	0.3287	0.5446
2.0470	0.2837	0.4706	0.6918
3.9000	0.4568	0.6546	0.8715
4.8880	0.5556	0.7561	0.9740
6.5150	0.7097	0.9145	1.1421
7.8790	0.8404	1.0482	1.2718
9.0280	0.9585	1.1654	1.3879
10.2880	1.0816	1.2900	1.5118
11.7780	1.2183	1.4311	1.6585
12.4010	1.2713	1.4687	1.6690
13.8060	1.3534	1.4901	1.6208
15.9970	1.4416	1.5270	1.6374
16.6320	1.4134	1.5109	1.6096
18.2140	1.3489	1.4213	1.4955
19.9330	1.3175	1.3589	1.4160
21.7900	1.3171	1.3415	1.4143
24.1090	1.3430	1.3515	1.4228
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				</tableData>
				<tableData	breakPoint="0">
					0	15	35
-4.359	-0.3864	-0.15362	0.10264
-3.384	-0.29204	-0.06576	0.18327
-2.173	-0.17502	0.05437	0.29912
-0.844	-0.02952	0.1887	0.42575
0.971	0.14334	0.3671	0.61298
1.939	0.22907	0.47278	0.70659
3.514	0.37887	0.63531	0.86628
4.602	0.49811	0.73776	0.98365
6.417	0.66324	0.92489	1.17077
7.386	0.75388	1.01861	1.26447
8.476	0.85864	1.12506	1.36689
10.168	1.03443	1.29545	1.54133
11.136	1.12429	1.40006	1.63494
12.227	1.2292	1.48983	1.72077
14.243	1.40319	1.56759	1.68014
16.264	1.50617	1.62396	1.69608
17.447	1.52903	1.56204	1.61005
18.019	1.53552	1.46463	1.55597
19.248	1.48335	1.44787	1.51778
21.527	1.39687	1.43918	1.49451
23.001	1.39762	1.42019	1.48248
24.159	1.38016	1.40882	1.47149
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				</tableData>
				<tableData	breakPoint="0.19">
					0	15	35
-4.2710	-0.3983	-0.1201	0.1414
-3.4270	-0.3082	-0.0440	0.2156
-1.6190	-0.1147	0.1428	0.4135
0.5510	0.1201	0.3826	0.6526
1.7570	0.2529	0.5183	0.7815
3.6860	0.4668	0.7367	0.9863
5.0420	0.6149	0.8816	1.1436
6.4590	0.7653	1.0324	1.2970
8.3880	0.9691	1.2522	1.5018
9.5940	1.1028	1.3811	1.6412
11.1310	1.2831	1.5496	1.8092
12.3670	1.4063	1.6647	1.9239
13.9340	1.5839	1.7453	1.9483
15.5020	1.6626	1.8014	1.9638
16.6470	1.6858	1.8033	1.9680
18.3950	1.6617	1.7005	1.8530
19.6010	1.5983	1.6659	1.8130
19.9320	1.5829	1.6654	1.8046
21.1080	1.5921	1.6736	1.7762
22.6150	1.6241	1.6974	1.7678
23.9710	1.6558	1.6949	1.7614
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				</tableData>
				<tableData	breakPoint="0.28">
					0	15	35
-4.1640	-0.3983	-0.1287	0.1568
-3.5350	-0.3370	-0.0637	0.2257
-2.3310	-0.2030	0.0686	0.3605
-1.2480	-0.0690	0.2004	0.4952
-0.7610	-0.0144	0.2629	0.5433
0.4420	0.1203	0.4082	0.6802
2.3680	0.3370	0.6219	0.9086
3.5720	0.4718	0.7659	1.0430
4.7150	0.6123	0.9103	1.1696
6.0940	0.7602	1.0677	1.3387
7.2980	0.8865	1.2008	1.4734
8.5020	1.0198	1.3560	1.6082
9.5850	1.1405	1.4779	1.7429
10.7880	1.2765	1.6106	1.8776
11.9920	1.4246	1.7602	2.0123
12.9600	1.5320	1.8369	2.0760
14.4010	1.6885	1.8983	2.0944
16.4520	1.7546	1.9245	2.0552
17.7480	1.7224	1.8199	2.0087
19.3420	1.7132	1.8383	1.9421
20.6680	1.7221	1.8556	1.9362
22.1130	1.7636	1.8429	1.9655
23.9510	1.7618	1.8366	1.9768
24.1010	1.7610	1.8365	1.9772
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				</tableData>
			</table>
			</product>
		<v>0</v>
		</ifthen>
		</function>

		<function name="aero/force/Lift_flap45">
			<description>additional lift flaps gt 35</description>
			<product>
				<property>aero/qbar-psf</property>
				<property>metrics/Sw-sqft</property>
				<property>aero/function/kCLge</property>
				<table>
					<independentVar>fcs/flap-pos-deg</independentVar>
					<tableData>
					35	0
					45	0.04
					</tableData>
				</table>
			</product>
		</function>

		<function name="aero/force/Lift_alpha_asym">
			<description>Lift due to alpha asymmetric state</description>
			<ifthen>
			<eq><p>aero/function/thrust-state-sym</p><v>0</v></eq>
			<product>
				<property>aero/qbar-psf</property>
				<property>metrics/Sw-sqft</property>
				<property>aero/function/kCLge</property>
				<table>
					<independentVar	lookup="row">aero/alpha-deg</independentVar>
					<independentVar	lookup="column">aero/function/power-balance</independentVar>
					<independentVar	lookup="table">fcs/flap-pos-deg</independentVar>
					<tableData	breakPoint="0">
						-1	0	1
-3.9330	-0.3265	-0.3806	-0.3187
-2.0450	-0.1223	-0.1769	-0.1188
-0.0250	0.0904	0.0549	0.0899
1.8640	0.3049	0.2787	0.3030
3.8840	0.4967	0.5073	0.5005
5.7730	0.7119	0.7254	0.6931
7.9220	0.9469	0.9683	0.9175
9.8550	1.1625	1.1910	1.1298
11.0270	1.2957	1.3302	1.2548
12.1140	1.4045	1.4597	1.3696
13.1130	1.4999	1.5677	1.4500
13.7220	1.5439	1.6385	1.4982
14.4190	1.5733	1.7089	1.5539
15.6330	1.5897	1.7482	1.6199
16.5480	1.5873	1.7475	1.6104
17.4470	1.5819	1.7324	1.5692
18.4500	1.5671	1.7166	1.5336
19.7520	1.5428	1.7114	1.5191
20.6010	1.5533	1.7289	1.5193
21.7120	1.5654	1.7537	1.5340
23.8900	1.5780	1.7706	1.5740
24.0040	1.5786	1.7710	1.5766
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					</tableData>
					<tableData	breakPoint="35">
						-1	0	1
-4.0930	0.1050	0.1569	0.1037
-2.3850	0.2951	0.3493	0.2939
-0.0980	0.5424	0.6099	0.5431
1.7480	0.7346	0.8370	0.7346
3.1250	0.8874	0.9860	0.8814
4.7230	1.0515	1.1776	1.0548
6.4040	1.2351	1.3769	1.2347
8.5800	1.4658	1.6310	1.4617
10.4260	1.6573	1.8429	1.6606
11.8310	1.8027	2.0027	1.8022
12.7680	1.8808	2.0727	1.8713
13.8970	1.9052	2.1056	1.8761
15.4400	1.9206	2.0807	1.8468
16.6520	1.9078	2.0511	1.7904
18.3320	1.8344	2.0009	1.7218
19.5720	1.7519	1.9542	1.6896
20.2880	1.7091	1.9355	1.6808
21.8860	1.7343	1.9699	1.7233
23.2360	1.7218	1.9763	1.7240
24.1730	1.7060	1.9761	1.7058
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						</tableData>
					</table>
				</product>
				<v>0</v>
			</ifthen>
		</function>

		<function name="aero/force/Lift_pitch_rate">
			<description>Lift due to pitch rate</description>
			<product>
				<property>aero/qbar-psf</property>
				<property>metrics/Sw-sqft</property>
				<property>velocities/q-aero-rad_sec</property>
				<property>aero/ci2vel</property>
				<table>
				<independentVar	lookup="row">aero/alpha-deg</independentVar>	<!-- new -->
				<tableData>
					-5	12.93
					0	13.1
					5	14.39
					10	14.11
				</tableData>
				</table>
			</product>
		</function>

		<function name="aero/force/Lift_alpha_rate">
			<description>Lift due to alpha rate</description>
			<product>
				<property>aero/qbarUW-psf</property>
				<property>metrics/Sw-sqft</property>
				<property>aero/alphadot-rad_sec</property>
				<property>aero/ci2vel</property>
				<value>5.3</value>
			</product>
		</function>

		<function name="aero/force/Lift_elevator">
			<description>Lift due to Elevator Deflection</description>
			<product>
				<property>aero/qbar-psf</property>
				<property>metrics/Sw-sqft</property>
			<table>
				<independentVar	lookup="row">aero/alpha-deg</independentVar>
				<independentVar	lookup="column">fcs/elevator-pos-deg</independentVar>
				<independentVar	lookup="table">aero/function/thrust-state</independentVar>
				<tableData	breakPoint="0">
					-13.5	-10	-5	0	5	10
-4.212	-0.144	-0.102	-0.061	0.000	0.113	0.148
-2.692	-0.160	-0.125	-0.076	0.000	0.090	0.140
-1.367	-0.156	-0.127	-0.063	0.000	0.094	0.135
0.348	-0.169	-0.123	-0.066	0.000	0.088	0.141
1.583	-0.151	-0.110	-0.051	0.000	0.093	0.152
3.134	-0.143	-0.105	-0.035	0.000	0.119	0.164
4.195	-0.147	-0.104	-0.046	0.000	0.095	0.156
5.487	-0.147	-0.098	-0.031	0.000	0.109	0.162
6.680	-0.150	-0.108	-0.035	0.000	0.120	0.157
8.247	-0.149	-0.101	-0.028	0.000	0.114	0.166
9.367	-0.161	-0.106	-0.047	0.000	0.105	0.159
10.650	-0.158	-0.107	-0.048	0.000	0.101	0.154
11.765	-0.156	-0.085	-0.038	0.000	0.090	0.152
13.079	-0.152	-0.102	-0.062	0.000	0.060	0.129
14.806	-0.148	-0.109	-0.062	0.000	0.047	0.107
16.965	-0.149	-0.128	-0.061	0.000	0.032	0.080
18.325	-0.140	-0.112	-0.068	0.000	0.028	0.071
19.420	-0.135	-0.112	-0.042	0.000	0.039	0.030
19.866	-0.184	-0.120	-0.064	0.000	0.044	0.017
20.935	-0.148	-0.135	-0.074	0.000	0.068	0.042
23.983	-0.071	-0.039	0.001	0.000	0.008	0.055
24.203	-0.059	-0.029	0.008	0.000	0.007	0.054
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				</tableData>
				<tableData	breakPoint="0.19">
					-13.5	-10	-5	0	5	10
-4.332	-0.155	-0.109	-0.045	0.000	0.117	0.157
-2.497	-0.175	-0.117	-0.046	0.000	0.112	0.155
-1.258	-0.188	-0.113	-0.048	0.000	0.115	0.159
0.178	-0.189	-0.119	-0.056	0.000	0.112	0.166
1.613	-0.193	-0.126	-0.060	0.000	0.111	0.167
2.811	-0.189	-0.118	-0.042	0.000	0.122	0.175
4.156	-0.202	-0.143	-0.057	0.000	0.116	0.174
5.388	-0.198	-0.132	-0.044	0.000	0.126	0.182
6.791	-0.206	-0.133	-0.039	0.000	0.114	0.180
8.211	-0.209	-0.146	-0.043	0.000	0.119	0.190
9.754	-0.196	-0.140	-0.041	0.000	0.129	0.194
11.006	-0.212	-0.144	-0.048	0.000	0.124	0.194
12.549	-0.209	-0.144	-0.036	0.000	0.121	0.195
13.651	-0.222	-0.144	-0.050	0.000	0.094	0.149
15.444	-0.227	-0.146	-0.079	0.000	0.055	0.074
16.768	-0.192	-0.103	-0.093	0.000	0.038	0.047
18.177	-0.135	-0.036	-0.104	0.000	0.027	0.043
19.227	-0.138	-0.034	-0.077	0.000	0.036	0.077
19.984	-0.147	-0.092	-0.044	0.000	0.054	0.102
21.606	-0.147	-0.111	-0.059	0.000	0.059	0.093
23.962	-0.087	-0.055	-0.045	0.000	0.074	0.111
24.019	-0.084	-0.053	-0.045	0.000	0.074	0.111
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				</tableData>
				<tableData	breakPoint="0.28">
					-13.5	-10	-5	0	5	10
-4.236	-0.191	-0.148	-0.063	0.000	0.136	0.200
-2.606	-0.193	-0.132	-0.059	0.000	0.098	0.196
-1.397	-0.203	-0.148	-0.070	0.000	0.093	0.190
0.188	-0.202	-0.149	-0.068	0.000	0.100	0.184
1.307	-0.202	-0.154	-0.063	0.000	0.089	0.190
2.948	-0.211	-0.152	-0.056	0.000	0.095	0.195
4.573	-0.204	-0.156	-0.056	0.000	0.097	0.194
5.702	-0.225	-0.157	-0.060	0.000	0.092	0.191
7.239	-0.209	-0.154	-0.046	0.000	0.110	0.197
8.915	-0.221	-0.145	-0.049	0.000	0.113	0.195
10.118	-0.227	-0.143	-0.051	0.000	0.116	0.202
11.327	-0.228	-0.153	-0.054	0.000	0.114	0.202
12.702	-0.234	-0.162	-0.072	0.000	0.108	0.188
13.787	-0.240	-0.160	-0.067	0.000	0.114	0.207
14.556	-0.232	-0.162	-0.063	0.000	0.107	0.199
15.572	-0.214	-0.156	-0.061	0.000	0.107	0.186
16.555	-0.209	-0.154	-0.066	0.000	0.090	0.168
17.471	-0.209	-0.137	-0.065	0.000	0.073	0.171
18.740	-0.215	-0.135	-0.074	0.000	0.046	0.154
19.985	-0.192	-0.145	-0.048	0.000	0.057	0.137
21.368	-0.213	-0.159	-0.101	0.000	0.042	0.097
22.321	-0.210	-0.137	-0.110	0.000	0.040	0.082
24.009	-0.127	-0.046	-0.026	0.000	0.062	0.084
24.077	-0.123	-0.042	-0.022	0.000	0.062	0.084
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				</tableData>
			</table>
			</product>
		</function>

		<function name="aero/force/Liftloss_ice">
			<description>Lift due to Elevator Deflection</description>
			<product>
				<property>aero/qbar-psf</property>
				<property>metrics/Sw-sqft</property>
				<property>aero/function/runtime_ice</property>
				<interpolate1d>
					<p>fcs/elevator-pos-deg</p>
					<v>0</v>
					<table>
						<independentVar	lookup="row">aero/alpha-deg</independentVar>
						<tableData>
-0.053	0.003
-0.025	0.003
3.426	0.003
5.875	0.001
6.376	-0.003
6.904	-0.026
8.016	-0.068
9.354	-0.119
11.073	-0.184
11.720	-0.208
13.324	-0.270
13.945	-0.297
14.656	-0.332
15.696	-0.374
15.932	-0.378
17.627	-0.373
17.945	-0.372
18.665	-0.326
19.097	-0.291
20.104	-0.249
20.150	-0.248
						</tableData>
					</table>
					<v>35</v>
					<table>
						<independentVar	lookup="row">aero/alpha-deg</independentVar>
						<tableData>
-0.028	-0.028
0.083	-0.028
1.694	-0.034
1.833	-0.035
3.778	-0.050
3.861	-0.051
5.667	-0.086
7.250	-0.130
7.278	-0.131
8.806	-0.194
9.444	-0.233
10.722	-0.327
11.028	-0.349
11.944	-0.397
12.556	-0.406
12.806	-0.397
13.472	-0.367
14.083	-0.354
14.778	-0.362
14.889	-0.362
15.917	-0.365
16.222	-0.354
16.694	-0.323
17.639	-0.267
18.444	-0.232
18.750	-0.223
19.222	-0.213
20.028	-0.211
20.056	-0.212
						</tableData>
					</table>
					</interpolate1d>
			</product>
		</function>

	</axis>

	<axis name="DRAG">
		<function name="aero/force/Drag_alpha_flaps">
			<description>Drag due to alpha and flaps</description>
			<product>
				<property>aero/function/kCDge</property>
				<property>aero/qbar-psf</property>
				<property>metrics/Sw-sqft</property>
			  <sum>
				<table>
				<independentVar	lookup="row">aero/alpha-deg</independentVar>
				<independentVar	lookup="column">fcs/flap-pos-deg</independentVar>
				<independentVar	lookup="table">aero/function/thrust-state</independentVar>

				<tableData	breakPoint="-1"> <!-- -4 table. drag in propeller -->
					0	15	35
-3.9119	0.0445	0.0812	0.1064
-3.9054	0.0445	0.0812	0.1064
-3.8708	0.0443	0.0811	0.1064
-2.0022	0.0349	0.0766	0.1062
-1.8417	0.0344	0.0765	0.1061
-1.7986	0.0342	0.0765	0.1061
0.0479	0.0324	0.0777	0.1060
0.0685	0.0325	0.0777	0.1061
0.1885	0.0325	0.0779	0.1063
2.0630	0.0344	0.0819	0.1137
2.1756	0.0347	0.0822	0.1143
2.2164	0.0348	0.0822	0.1145
4.0984	0.0423	0.0892	0.1264
4.1060	0.0423	0.0892	0.1265
4.2746	0.0432	0.0903	0.1281
5.8054	0.0523	0.1034	0.1444
6.1916	0.0552	0.1071	0.1481
6.2476	0.0556	0.1076	0.1486
7.8342	0.0707	0.1239	0.1653
8.1307	0.0738	0.1276	0.1694
8.1784	0.0743	0.1282	0.1701
9.7966	0.0925	0.1543	0.1980
10.1578	0.0969	0.1617	0.2050
10.2072	0.0976	0.1627	0.2060
11.4926	0.1160	0.1947	0.2341
12.1582	0.1275	0.2137	0.2515
12.1659	0.1276	0.2139	0.2517
13.3031	0.1507	0.2485	0.2849
14.0967	0.1699	0.2725	0.3095
14.1943	0.1725	0.2753	0.3126
15.4091	0.2081	0.3105	0.3512
16.1666	0.2326	0.3330	0.3752
16.1699	0.2327	0.3331	0.3753
17.7177	0.2839	0.3842	0.4242
17.8796	0.2893	0.3894	0.4293
18.2087	0.3002	0.3997	0.4396
19.7178	0.3507	0.4451	0.4876
20.0815	0.3632	0.4558	0.4994
20.0969	0.3638	0.4563	0.4999
21.6901	0.4203	0.5036	0.5522
21.8311	0.4253	0.5078	0.5568
22.0690	0.4336	0.5149	0.5646
23.7183	0.4893	0.5643	0.6176
23.9626	0.4974	0.5716	0.6254
24.1519	0.5036	0.5769	0.6314
24.2649	0.5073	0.5777	0.6350

				</tableData>

				<tableData	breakPoint="0">
					0	15	35
-3.9330	0.0454	0.0713	0.1033
-2.2089	0.0389	0.0712	0.1020
-0.5998	0.0339	0.0732	0.1074
1.6998	0.0351	0.0770	0.1207
3.4237	0.0393	0.0850	0.1361
4.8601	0.0457	0.0940	0.1504
7.2748	0.0592	0.1164	0.1783
8.7681	0.0707	0.1359	0.2021
10.1479	0.0869	0.1539	0.2219
12.5036	0.1201	0.1991	0.2675
13.7109	0.1423	0.2262	0.2943
14.9184	0.1693	0.2567	0.3254
16.8715	0.2210	0.3105	0.3829
18.0202	0.2571	0.3451	0.4173
18.9983	0.2881	0.3762	0.4483
20.8945	0.3536	0.4383	0.5129
22.1006	0.3999	0.4810	0.5542
23.4227	0.4552	0.5263	0.5996
24.1084	0.4889	0.5527	0.6253
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				</tableData>
				<tableData	breakPoint="0.19">
					0	15	35
-3.9821	0.0586	0.0912	0.1199
-2.1152	0.0491	0.0887	0.1187
-0.1880	0.0427	0.0885	0.1226
1.8579	0.0417	0.0930	0.1352
3.8457	0.0449	0.1038	0.1565
5.2908	0.0523	0.1133	0.1724
7.6403	0.0658	0.1351	0.2074
9.0835	0.0775	0.1549	0.2310
10.5287	0.0926	0.1799	0.2594
12.6391	0.1300	0.2250	0.3110
13.8425	0.1566	0.2602	0.3428
15.6507	0.2087	0.3161	0.3957
17.0350	0.2485	0.3600	0.4404
18.5996	0.2997	0.4157	0.4910
20.5272	0.3694	0.4873	0.5651
21.4939	0.4053	0.5230	0.6010
22.5771	0.4504	0.5652	0.6430
24.0165	0.5130	0.6194	0.6947
24.0696	0.5155	0.6216	0.6967
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				</tableData>
				<tableData	breakPoint="0.28">
					0	15	35
-3.9979	0.0555	0.0961	0.1375
-2.3830	0.0530	0.0965	0.1408
-0.9167	0.0482	0.0945	0.1455
0.6106	0.0458	0.0935	0.1544
2.1379	0.0458	0.0973	0.1691
3.6652	0.0482	0.1064	0.1839
5.1314	0.0530	0.1185	0.2038
6.6570	0.0602	0.1304	0.2213
8.0619	0.0694	0.1507	0.2430
9.4057	0.0805	0.1756	0.2622
10.9946	0.1035	0.2093	0.2866
12.2162	0.1239	0.2406	0.3140
13.4377	0.1522	0.2742	0.3473
13.9873	0.1672	0.2911	0.3634
15.1477	0.2033	0.3295	0.4034
16.2470	0.2450	0.3704	0.4449
17.3462	0.2855	0.4137	0.4883
18.3843	0.3248	0.4546	0.5318
19.7270	0.3810	0.5080	0.5892
20.7652	0.4254	0.5558	0.6325
21.8033	0.4706	0.6067	0.6782
23.3931	0.5339	0.6811	0.7485
24.1060	0.5651	0.7143	0.7798
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
				</tableData>
				</table>

				  <!--
				  Wind tunnel data includes gear drag at flaps 15+.
				  Subtracting that out to avoid double-dipping.
				  -->
				  <table>
					<independentVar>fcs/flap-pos-deg</independentVar>
					<tableData>
					0	0
					15	-0.02
					</tableData>
				  </table>
			    </sum>
			</product>
		</function>

		<function name="aero/force/Drag_flap45">
			<description>additional drag flaps gt 35</description>
			<product>
				<property>aero/qbar-psf</property>
				<property>metrics/Sw-sqft</property>
				<table>
					<independentVar>fcs/flap-pos-deg</independentVar>
					<tableData>
					35	0
					45	0.04
					</tableData>
				</table>
			</product>
		</function>

		<function name="aero/Drag_model">
			<description>Drag increase for C310A</description>
			<product>
				<property>aero/qbar-psf</property>
				<property>metrics/Sw-sqft</property>
				<property>aero/model_dragaddition</property>
				<value>0.0014</value> <!-- * -->
			</product>
		</function>

		<function name="aero/force/Drag_finetune">
			<description>Drag corrections Reynolds etc.</description>
			<product>
				<property>aero/qbar-psf</property>
				<property>metrics/Sw-sqft</property>
				<property>aero/model_dragaddition</property>
				<value>0</value> <!-- * -->
			</product>
		</function>


		<function name="aero/force/Drag_beta">
			<description>Drag due to sideslip</description> <!-- * -->
			<product>
				<property>aero/qbar-psf</property>
				<property>metrics/Sw-sqft</property>
				<table>
					<independentVar lookup="row">aero/beta-rad</independentVar>
					<tableData>
						-1.57	1.23
						-0.26	0.05
						0		0
						0.26	0.05
						1.57	1.23
					</tableData>
				</table>
			</product>
		</function>


		<function name="aero/force/Drag_elevator">
			<description>Drag due to Elevator Deflection</description>
			<product>
				<property>aero/qbar-psf</property>
				<property>metrics/Sw-sqft</property>
				<table>
				<independentVar	lookup="row">aero/alpha-deg</independentVar>
				<independentVar	lookup="column">fcs/elevator-pos-deg</independentVar>
					<tableData>
	-13.5	0	10
-3.9602	0.0250	0.0000	-0.0013
-3.9569	0.0250	0.0000	-0.0013
-3.9557	0.0250	0.0000	-0.0013
-1.9035	0.0190	0.0000	-0.0004
-1.8990	0.0190	0.0000	-0.0004
-1.3946	0.0177	0.0000	-0.0010
0.0494	0.0152	0.0000	-0.0004
0.6763	0.0145	0.0000	0.0015
0.9328	0.0142	0.0000	0.0025
2.1059	0.0104	0.0000	0.0058
3.3682	0.0040	0.0000	0.0070
4.5603	0.0015	0.0000	0.0082
4.6129	0.0015	0.0000	0.0083
5.1179	0.0011	0.0000	0.0094
6.6564	-0.0001	0.0000	0.0144
6.9758	-0.0005	0.0000	0.0162
8.0400	-0.0032	0.0000	0.0222
8.4397	-0.0043	0.0000	0.0237
8.7431	-0.0049	0.0000	0.0245
10.0775	-0.0053	0.0000	0.0259
10.5100	-0.0065	0.0000	0.0261
10.6203	-0.0069	0.0000	0.0261
12.3844	-0.0141	0.0000	0.0272
12.4577	-0.0144	0.0000	0.0273
12.4602	-0.0144	0.0000	0.0273
13.5206	-0.0159	0.0000	0.0274
14.1295	-0.0165	0.0000	0.0262
14.6388	-0.0193	0.0000	0.0240
14.9559	-0.0208	0.0000	0.0240
14.9581	-0.0209	0.0000	0.0240
16.4449	-0.0247	0.0000	0.0246
16.4767	-0.0248	0.0000	0.0247
18.4586	-0.0304	0.0000	0.0350
18.5999	-0.0308	0.0000	0.0359
19.4481	-0.0326	0.0000	0.0420
20.2722	-0.0341	0.0000	0.0482
20.7106	-0.0350	0.0000	0.0513
21.3934	-0.0368	0.0000	0.0543
21.4254	-0.0368	0.0000	0.0545
22.5657	-0.0359	0.0000	0.0581
22.6734	-0.0356	0.0000	0.0585
23.0864	-0.0341	0.0000	0.0597
24.0385	-0.0298	0.0000	0.0620
24.0964	-0.0295	0.0000	0.0621
24.1131	-0.0294	0.0000	0.0621
					</tableData>
				</table>
			</product>
		</function>

		<function name="aero/force/Drag_rudder">
			<description>Drag due to rudder Deflection</description>
			<product>
				<property>aero/qbar-psf</property>
				<property>metrics/Sw-sqft</property>
		                <abs><property>fcs/rudder-pos-rad</property></abs>
		                <value>0.0016</value>
			</product>
		</function>

		<function name="aero/force/Drag_gear">
			<description>Drag due to gear</description>
			<product>
				<property>aero/qbar-psf</property>
				<property>metrics/Sw-sqft</property>
				<property>gear/gear-pos-norm</property>
				<value>0.02</value> <!-- * -->
			</product>
		</function>

		<function name="aero/force/Drag_landing_light[0]"> <!--TheEagle addition-->
			<description>Drag due to left landing light</description>
			<product>
				<property>aero/qbar-psf</property>
				<sin>
					<toradians>
						<property>/sim/model/lights/landing[0]/pos-deg</property>
					</toradians>
				</sin>
				<!-- drag coefficient of a half sphere with the flat side forward -->
				<value>1.17</value>
				<pow>
					<!-- radius of the landing light -->
					<value>0.3</value>
					<value>2</value>
				</pow>
			</product>
		</function>

		<function name="aero/force/Drag_landing_light[1]"> <!--TheEagle addition-->
			<description>Drag due to right landing light</description>
			<product>
				<property>aero/qbar-psf</property>
				<sin>
					<toradians>
						<property>/sim/model/lights/landing[1]/pos-deg</property>
					</toradians>
				</sin>
				<!-- drag coefficient of a half sphere with the flat side forward -->
				<value>1.17</value>
				<pow>
					<!-- radius of the landing light -->
					<value>0.3</value>
					<value>2</value>
				</pow>
			</product>
		</function>

		<function name="aero/force/Drag_ice">
			<description>Drag due to ice accreation</description>
			<product>
				<property>aero/function/runtime_ice</property>
				<property>aero/qbar-psf</property>
				<property>metrics/Sw-sqft</property>
 				<interpolate1d>
					<p>aero/function/thrust-state</p>
					<v> 0 </v>
  						<interpolate1d>
							<p> fcs/flap-pos-deg </p>
							<v> 0 </v>
								<table>
									<independentVar	lookup="row">aero/alpha-deg</independentVar>
									<tableData>
-4.1809	0.0253
-4.0147	0.0254
-2.2693	0.0268
-2.2485	0.0268
-0.1914	0.0254
0.3489	0.0233
1.8034	0.0174
3.7982	0.0150
4.5047	0.0152
5.7930	0.0176
7.3099	0.0253
7.6215	0.0273
9.2007	0.0384
10.5722	0.0507
10.6968	0.0519
12.0267	0.0670
12.8994	0.0785
13.1903	0.0825
14.2708	0.0967
15.3513	0.1099
15.8916	0.1141
16.4318	0.1181
17.4292	0.1272
18.7175	0.1156
18.8422	0.1129
20.1305	0.0763
20.6708	0.0631
21.3565	0.0535
22.0006	0.0498
22.9564	0.0405
23.1642	0.0375
24.0993	0.0205
									</tableData>
								</table>
							<v> 35 </v>
								<table>
									<independentVar	lookup="row">aero/alpha-deg</independentVar>
									<tableData>
-4.1408	0.0361
-3.8662	0.0360
-2.0282	0.0333
-1.7535	0.0321
-0.0423	0.0207
0.0000	0.0205
1.6479	0.0159
2.0282	0.0154
3.7183	0.0136
4.0563	0.0134
5.9155	0.0165
6.2535	0.0183
7.5000	0.0273
7.5211	0.0275
8.7254	0.0395
8.9577	0.0422
10.3944	0.0580
10.4155	0.0582
11.5775	0.0668
11.8310	0.0693
13.0141	0.0867
13.8592	0.0956
14.1972	0.0987
15.3803	0.1089
16.3944	0.1088
16.7324	0.1080
18.2113	0.0989
18.2535	0.0984
20.0282	0.0689
20.3340	0.0644
21.5493	0.0510
22.1282	0.0448
22.9859	0.0353
24.1069	0.0231
									</tableData>
								</table>
						</interpolate1d>
					<v> 0.28 </v>
  						<interpolate1d>
			    				<p> fcs/flap-pos-deg </p>
			    				<v> 0 </v>
							<table>
								<independentVar	lookup="row">aero/alpha-deg</independentVar>
								<tableData>
-3.9123	0.0364
-3.8751	0.0361
-2.1666	0.0278
-2.0189	0.0273
-0.0242	0.0233
0.1331	0.0230
2.1996	0.0208
2.5797	0.0212
4.2670	0.0239
5.2656	0.0235
6.3345	0.0232
7.4910	0.0272
8.1447	0.0317
9.3911	0.0402
9.7833	0.0422
11.1638	0.0516
11.1836	0.0518
12.1886	0.0639
12.3725	0.0658
13.4092	0.0779
14.2274	0.0887
14.3598	0.0907
15.8599	0.1040
16.1144	0.1047
17.3389	0.1028
17.9012	0.1061
17.9925	0.1054
19.6982	0.0855
21.1686	0.0657
22.7207	0.0444
23.2958	0.0392
24.1629	0.0343
								</tableData>
							</table>
		    					<v> 35 </v>
							<table>
								<independentVar	lookup="row">aero/alpha-deg</independentVar>
								<tableData>
-4.2149	0.0339
-3.8929	0.0328
-2.1313	0.0276
-1.8690	0.0269
-0.0637	0.0222
0.0394	0.0218
1.7147	0.0160
2.1238	0.0159
3.3564	0.0174
4.1219	0.0174
5.3541	0.0179
6.0335	0.0199
6.6950	0.0231
7.8586	0.0290
8.1456	0.0314
9.4237	0.0474
10.6088	0.0676
10.9022	0.0740
11.4847	0.0837
12.2072	0.0934
13.4254	0.1095
13.7579	0.1127
14.7304	0.1173
15.6210	0.1151
16.1222	0.1117
17.6872	0.0932
18.0053	0.0891
19.2524	0.0711
19.9789	0.0590
20.8175	0.0464
22.0621	0.0298
22.3827	0.0249
23.9478	-0.0047
24.0908	-0.0077
								</tableData>
							</table>
  						</interpolate1d>
  				</interpolate1d>
			</product>
		</function>

	</axis>

	<axis name="SIDE">
		<function name="aero/force/Side_beta">
			<description>Side force due to beta</description> <!-- * -->
			<product>
				<property>aero/qbar-psf</property>
				<property>metrics/Sw-sqft</property>
				<table>
				<independentVar	lookup="row">aero/alpha-deg</independentVar>
				<independentVar	lookup="column">aero/beta-deg</independentVar>
				<independentVar	lookup="table">fcs/flap-pos-deg</independentVar>
				<tableData	breakPoint="0">
-8	-4	0	4	8
-4.1499	0.0997	0.0477	-0.0036	-0.0523	-0.1039
-3.9762	0.0994	0.0474	-0.0037	-0.0523	-0.1038
-0.5060	0.0949	0.0436	-0.0059	-0.0524	-0.1027
1.5617	0.0915	0.0433	-0.0073	-0.0527	-0.1006
3.3241	0.0875	0.0414	-0.0083	-0.0527	-0.0985
5.5468	0.0851	0.0381	-0.0094	-0.0504	-0.0973
6.6396	0.0842	0.0369	-0.0096	-0.0497	-0.0946
8.6674	0.0839	0.0394	-0.0096	-0.0468	-0.0899
10.1962	0.0845	0.0442	-0.0094	-0.0426	-0.0826
11.9762	0.0847	0.0485	-0.0092	-0.0446	-0.0704
13.0275	0.0849	0.0460	-0.0091	-0.0481	-0.0709
14.5933	0.0869	0.0385	-0.0088	-0.0539	-0.0868
15.6455	0.0896	0.0330	-0.0074	-0.0572	-0.0970
16.3541	0.0920	0.0326	-0.0053	-0.0562	-0.1034
17.4028	0.0961	0.0383	-0.0009	-0.0500	-0.1094
18.4363	0.0941	0.0455	0.0015	-0.0439	-0.1019
19.7225	0.0896	0.0514	0.0000	-0.0381	-0.0870
21.0774	0.0827	0.0505	-0.0004	-0.0340	-0.0747
22.4330	0.0765	0.0460	-0.0011	-0.0309	-0.0677
23.9948	0.0682	0.0436	-0.0053	-0.0285	-0.0657
24.0367	0.0680	0.0436	-0.0055	-0.0284	-0.0657
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
				</tableData>
				<tableData	breakPoint="15">
-8	-4	0	4	8
-4.2306	0.1170	0.0569	-0.0058	-0.0704	-0.1362
-3.9242	0.1166	0.0568	-0.0061	-0.0704	-0.1348
-1.4341	0.1125	0.0557	-0.0081	-0.0692	-0.1259
-0.2398	0.1097	0.0546	-0.0082	-0.0681	-0.1222
1.1607	0.1071	0.0530	-0.0084	-0.0671	-0.1175
3.2159	0.1039	0.0509	-0.0104	-0.0656	-0.1111
5.0153	0.1006	0.0495	-0.0101	-0.0632	-0.1057
6.6379	0.0977	0.0483	-0.0100	-0.0607	-0.1024
8.4780	0.0953	0.0467	-0.0101	-0.0572	-0.0991
10.4066	0.0937	0.0456	-0.0096	-0.0528	-0.0971
11.6275	0.0915	0.0436	-0.0087	-0.0504	-0.0964
12.9624	0.0906	0.0420	-0.0073	-0.0478	-0.0957
14.5723	0.0918	0.0485	-0.0056	-0.0447	-0.0992
15.9938	0.0968	0.0608	-0.0038	-0.0431	-0.1043
17.3233	0.1009	0.0662	-0.0016	-0.0431	-0.1087
18.5564	0.0984	0.0632	0.0006	-0.0443	-0.1090
19.5339	0.0951	0.0571	0.0016	-0.0453	-0.1055
21.1307	0.0896	0.0465	0.0017	-0.0458	-0.0965
22.2951	0.0853	0.0415	0.0011	-0.0443	-0.0878
24.0044	0.0789	0.0380	0.0001	-0.0343	-0.0752
24.1151	0.0785	0.0378	0.0000	-0.0334	-0.0744
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
				</tableData>
				<tableData	breakPoint="35">
-8	-4	0	4	8
-4.1832	0.1187	0.0499	-0.0370	-0.0677	-0.1353
-4.0034	0.1183	0.0500	-0.0379	-0.0679	-0.1345
-2.0673	0.1151	0.0499	-0.0405	-0.0695	-0.1274
-0.8137	0.1136	0.0488	-0.0400	-0.0694	-0.1245
0.6468	0.1119	0.0467	-0.0354	-0.0690	-0.1217
2.5304	0.1098	0.0481	-0.0279	-0.0685	-0.1189
3.2024	0.1091	0.0488	-0.0254	-0.0683	-0.1182
4.8416	0.1072	0.0519	-0.0202	-0.0672	-0.1168
6.5117	0.1054	0.0536	-0.0186	-0.0649	-0.1158
7.5466	0.1038	0.0530	-0.0195	-0.0622	-0.1152
9.1790	0.1008	0.0501	-0.0205	-0.0574	-0.1143
10.7534	0.0987	0.0453	-0.0217	-0.0523	-0.1137
12.0150	0.0975	0.0425	-0.0216	-0.0486	-0.1132
13.5514	0.0963	0.0442	-0.0208	-0.0473	-0.1127
15.3048	0.0950	0.0467	-0.0180	-0.0470	-0.1128
17.0814	0.0908	0.0491	-0.0159	-0.0462	-0.1133
17.9847	0.0883	0.0497	-0.0143	-0.0451	-0.1139
19.5447	0.0845	0.0439	-0.0107	-0.0422	-0.1132
20.4776	0.0807	0.0400	-0.0058	-0.0400	-0.1028
22.0300	0.0734	0.0326	0.0057	-0.0351	-0.0774
22.8105	0.0694	0.0286	0.0065	-0.0317	-0.0667
24.0164	0.0629	0.0235	0.0035	-0.0260	-0.0573
24.0273	0.0628	0.0234	0.0034	-0.0259	-0.0572
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				</tableData>
				</table>
			</product>
		</function>

		<function name="aero/force/Side_roll_rate">
			<description>Side force due to roll rate</description>
			<product>
				<property>aero/qbar-psf</property>
				<property>metrics/Sw-sqft</property>
				<property>aero/bi2vel</property>
				<property>velocities/p-aero-rad_sec</property>
				<table>
					<independentVar lookup="row">aero/alpha-deg</independentVar>
					<tableData>
						-5	-0.132
						0	-0.104
						5	-0.077
						10	-0.0509
					</tableData>
				</table>
			</product>
		</function>

		<function name="aero/force/Side_yaw_rate">
			<description>Side force due to yaw rate</description>
			<product>
				<property>aero/qbar-psf</property>
				<property>metrics/Sw-sqft</property>
				<property>aero/bi2vel</property>
				<property>velocities/r-aero-rad_sec</property>
				<table>
					<independentVar lookup="row">aero/alpha-deg</independentVar>
					<tableData>
						-5	0.442
						0	0.467
						5	0.487
						10	0.5
					</tableData>
				</table>
			</product>
		</function>

		<function name="aero/force/Side_rudder">
			<description>Side force due to rudder</description>
			<product>
				<property>aero/qbar-psf</property>
				<property>metrics/Sw-sqft</property>
				<property>fcs/rudder-pos-rad</property>
				<table>
					<independentVar lookup="row">aero/alpha-deg</independentVar>
					<tableData>
						-5	0.328
						0	0.305
						5	0.282
						10	0.253
					</tableData>
				</table>
			</product>
		</function>
	</axis>


	<axis name="PITCH">
		<function name="aero/moment/Pitch_base_sym">
			<description>Pitch moment due to alpha,flaps,thrust state,sym</description>
			<ifthen>
			<eq><p>aero/function/thrust-state-sym</p><v>1</v></eq>
			<product>
				<property>aero/qbar-psf</property>
				<property>metrics/Sw-sqft</property>
				<property>metrics/cbarw-ft</property>
			<table>
				<independentVar	lookup="row">aero/alpha-deg</independentVar>
				<independentVar	lookup="column">fcs/flap-pos-deg</independentVar>
				<independentVar	lookup="table">aero/function/thrust-state</independentVar>
				<tableData	breakPoint="-4">
					0	15	35
-4.1186	0.1730	0.2138	0.2813
-4.0808	0.1723	0.2129	0.2805
-4.0567	0.1718	0.2124	0.2801
-2.6092	0.1431	0.1796	0.2512
-2.4767	0.1404	0.1766	0.2483
-1.8822	0.1273	0.1633	0.2349
-0.5495	0.0955	0.1348	0.2057
-0.4448	0.0932	0.1327	0.2035
-0.0727	0.0856	0.1252	0.1960
1.4821	0.0607	0.0929	0.1649
1.9581	0.0523	0.0813	0.1550
2.8672	0.0318	0.0577	0.1347
3.4590	0.0164	0.0424	0.1201
4.1297	-0.0012	0.0261	0.1024
5.3174	-0.0314	-0.0019	0.0724
5.5748	-0.0377	-0.0081	0.0682
7.0707	-0.0736	-0.0465	0.0365
7.0784	-0.0738	-0.0467	0.0362
7.4149	-0.0814	-0.0549	0.0252
9.3622	-0.1233	-0.1118	-0.0458
9.8644	-0.1352	-0.1306	-0.0651
10.9451	-0.1659	-0.1750	-0.1074
11.7865	-0.1942	-0.2111	-0.1415
12.0670	-0.2043	-0.2231	-0.1536
12.9535	-0.2411	-0.2616	-0.1981
13.2949	-0.2584	-0.2844	-0.2177
13.4041	-0.2644	-0.2934	-0.2242
14.6950	-0.3462	-0.4061	-0.3026
14.9368	-0.3622	-0.4240	-0.3174
15.2204	-0.3807	-0.4435	-0.3346
16.7063	-0.4722	-0.5282	-0.4226
17.0037	-0.4894	-0.5425	-0.4396
17.3992	-0.5116	-0.5604	-0.4619
18.7700	-0.5787	-0.6161	-0.5351
18.9578	-0.5869	-0.6233	-0.5445
19.2407	-0.5993	-0.6342	-0.5584
21.0276	-0.6759	-0.6983	-0.6372
21.0498	-0.6769	-0.6990	-0.6381
22.0015	-0.7164	-0.7294	-0.6755
23.8932	-0.7876	-0.7864	-0.7467
23.9528	-0.7897	-0.7881	-0.7489
24.0083	-0.7917	-0.7898	-0.7510
				</tableData>
				<tableData	breakPoint="0">
					0	15	35
-4.031	-0.037	-0.045	-0.045
-4.009	-0.037	-0.045	-0.045
-3.991	-0.037	-0.045	-0.046
-3.431	-0.037	-0.046	-0.047
-2.673	-0.037	-0.046	-0.048
-2.597	-0.037	-0.046	-0.048
-1.757	-0.037	-0.047	-0.049
-0.715	-0.037	-0.047	-0.050
-0.668	-0.037	-0.047	-0.050
0.048	-0.037	-0.047	-0.050
0.240	-0.037	-0.047	-0.050
1.744	-0.037	-0.047	-0.050
2.745	-0.037	-0.047	-0.050
3.864	-0.037	-0.047	-0.050
5.479	-0.037	-0.047	-0.050
5.613	-0.037	-0.047	-0.050
5.766	-0.037	-0.047	-0.050
8.669	-0.037	-0.047	-0.050
9.482	-0.037	-0.047	-0.050
10.219	-0.037	-0.047	-0.050
11.371	-0.037	-0.047	-0.050
13.039	-0.037	-0.046	-0.050
13.233	-0.037	-0.046	-0.050
14.308	-0.037	-0.045	-0.050
14.781	-0.037	-0.044	-0.050
15.510	-0.037	-0.044	-0.050
15.618	-0.037	-0.044	-0.050
15.895	-0.037	-0.043	-0.050
16.146	-0.037	-0.043	-0.050
16.200	-0.037	-0.043	-0.050
16.874	-0.037	-0.042	-0.049
17.045	-0.036	-0.042	-0.048
17.163	-0.036	-0.042	-0.048
17.532	-0.036	-0.041	-0.047
17.917	-0.035	-0.041	-0.046
18.309	-0.035	-0.040	-0.044
18.696	-0.034	-0.039	-0.043
18.709	-0.034	-0.039	-0.043
18.979	-0.033	-0.039	-0.042
19.381	-0.032	-0.038	-0.040
19.987	-0.030	-0.038	-0.037
20.002	-0.030	-0.038	-0.037
20.016	-0.030	-0.038	-0.037
				</tableData>
				<tableData	breakPoint="0.19">
					0	15	35
-4.007	-0.037	-0.040	-0.040
-3.997	-0.037	-0.040	-0.040
-3.990	-0.037	-0.040	-0.040
-2.817	-0.038	-0.042	-0.042
-2.732	-0.038	-0.043	-0.042
-1.896	-0.038	-0.044	-0.043
-1.676	-0.038	-0.044	-0.043
-0.909	-0.038	-0.045	-0.044
-0.704	-0.038	-0.045	-0.044
0.348	-0.038	-0.046	-0.044
0.680	-0.039	-0.046	-0.044
2.653	-0.039	-0.046	-0.046
2.788	-0.039	-0.046	-0.046
3.389	-0.039	-0.046	-0.046
4.693	-0.039	-0.047	-0.047
5.311	-0.040	-0.047	-0.047
5.362	-0.040	-0.047	-0.047
6.233	-0.040	-0.047	-0.048
7.132	-0.040	-0.048	-0.049
7.454	-0.040	-0.048	-0.049
8.520	-0.040	-0.048	-0.050
8.652	-0.040	-0.048	-0.050
8.926	-0.040	-0.048	-0.050
9.602	-0.039	-0.048	-0.050
10.157	-0.039	-0.048	-0.050
10.530	-0.038	-0.048	-0.050
11.253	-0.038	-0.047	-0.050
11.632	-0.037	-0.046	-0.050
11.823	-0.037	-0.046	-0.050
12.665	-0.036	-0.045	-0.049
12.834	-0.036	-0.045	-0.049
13.804	-0.034	-0.043	-0.046
14.259	-0.034	-0.043	-0.045
14.316	-0.034	-0.042	-0.045
15.219	-0.033	-0.041	-0.042
15.437	-0.033	-0.041	-0.042
15.683	-0.032	-0.041	-0.041
16.517	-0.032	-0.040	-0.040
16.849	-0.031	-0.039	-0.039
17.151	-0.031	-0.039	-0.039
17.683	-0.031	-0.038	-0.039
18.001	-0.031	-0.038	-0.038
18.467	-0.031	-0.038	-0.038
19.252	-0.031	-0.037	-0.037
20.003	-0.031	-0.037	-0.037
20.004	-0.031	-0.037	-0.037
20.036	-0.031	-0.037	-0.037
				</tableData>
				<tableData	breakPoint="0.28">
					0	15	35
-4.044	-0.037	-0.0387	-0.0388
-2.639	-0.037	-0.0395	-0.0388
-0.720	-0.037	-0.0406	-0.0390
0.575	-0.037	-0.0413	-0.0404
2.389	-0.037	-0.0422	-0.0441
4.320	-0.037	-0.0431	-0.0476
5.776	-0.037	-0.0437	-0.0481
7.189	-0.037	-0.0442	-0.0483
10.468	-0.037	-0.0445	-0.0480
11.745	-0.038	-0.0445	-0.0476
12.723	-0.036	-0.0437	-0.0463
13.521	-0.034	-0.0426	-0.0446
14.367	-0.031	-0.0408	-0.0423
14.931	-0.029	-0.0393	-0.0406
15.669	-0.027	-0.0374	-0.0384
16.632	-0.026	-0.0345	-0.0368
17.548	-0.025	-0.0318	-0.0361
18.602	-0.025	-0.0301	-0.0357
19.962	-0.025	-0.0284	-0.0354
19.989	-0.025	-0.0284	-0.0354
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				</tableData>
			</table>
			</product>
		<v>0</v>
		</ifthen>
		</function>

		<function name="aero/moment/Pitch_base_asym">
			<description>Pitch moment due to alpha,asym</description>
			<ifthen>
			<eq><p>aero/function/thrust-state-asym</p><v>1</v></eq>
			<product>
				<property>aero/qbar-psf</property>
				<property>metrics/Sw-sqft</property>
				<property>metrics/cbarw-ft</property>
				<table>
				<independentVar	lookup="row">aero/alpha-deg</independentVar>
				<independentVar	lookup="column">aero/function/power-balance</independentVar>
				<independentVar	lookup="table">fcs/flap-pos-deg</independentVar>
				<tableData	breakPoint="0">
					-1	0	1
-4.0410	0.1682	0.2350	0.1697
-3.9760	0.1674	0.2340	0.1688
-2.0810	0.1447	0.2073	0.1437
-1.9060	0.1431	0.2053	0.1414
-0.2070	0.1288	0.1829	0.1170
-0.1630	0.1283	0.1821	0.1163
0.0540	0.1256	0.1774	0.1128
1.8630	0.0934	0.1402	0.0781
2.0590	0.0898	0.1372	0.0737
3.8890	0.0630	0.1116	0.0355
4.0850	0.0608	0.1089	0.0324
5.5880	0.0452	0.0871	0.0110
6.0020	0.0396	0.0801	0.0034
6.1980	0.0365	0.0765	-0.0006
7.6580	0.0041	0.0382	-0.0340
8.0940	-0.0062	0.0243	-0.0451
8.1150	-0.0067	0.0236	-0.0456
9.6410	-0.0396	-0.0123	-0.0882
10.2070	-0.0535	-0.0236	-0.1053
11.7320	-0.1019	-0.0554	-0.1539
12.1240	-0.1146	-0.0657	-0.1674
12.1460	-0.1153	-0.0664	-0.1682
13.2140	-0.1503	-0.1187	-0.2214
13.5400	-0.1636	-0.1397	-0.2449
14.1720	-0.1964	-0.1832	-0.2984
14.5640	-0.2222	-0.2146	-0.3351
15.5010	-0.2961	-0.3224	-0.4301
15.5450	-0.2998	-0.3290	-0.4347
16.1980	-0.3563	-0.4197	-0.5014
16.4160	-0.3746	-0.4412	-0.5177
16.4380	-0.3764	-0.4432	-0.5192
17.5050	-0.4590	-0.5276	-0.5853
18.1370	-0.5076	-0.5711	-0.6195
18.2460	-0.5161	-0.5781	-0.6250
18.9870	-0.5755	-0.6179	-0.6587
19.5750	-0.6233	-0.6396	-0.6831
19.6840	-0.6318	-0.6434	-0.6877
20.6860	-0.6965	-0.6782	-0.7291
21.5580	-0.7305	-0.7065	-0.7558
21.9720	-0.7423	-0.7188	-0.7643
22.6030	-0.7576	-0.7353	-0.7736
23.9540	-0.7891	-0.7612	-0.7861
23.9760	-0.7897	-0.7616	-0.7863
24.0410	-0.7912	-0.7627	-0.7868
				</tableData>
				<tableData	breakPoint="35">
					-1	0	1
-4.0360	0.2533	0.2578	0.2555
-1.4050	0.2266	0.2518	0.2519
0.3990	0.2043	0.2481	0.2497
2.1600	0.1660	0.2175	0.2214
4.1830	0.1258	0.1894	0.1929
5.8360	0.0923	0.1513	0.1558
7.7720	0.0460	0.1088	0.1095
10.2520	-0.0150	0.0417	0.0426
11.6010	-0.0494	0.0192	0.0097
12.6680	-0.1009	-0.0421	-0.0543
13.4310	-0.1579	-0.1164	-0.1196
14.1290	-0.2135	-0.2020	-0.2021
15.3070	-0.2964	-0.3505	-0.3628
16.5700	-0.3618	-0.4254	-0.4275
17.5260	-0.4037	-0.4661	-0.4604
19.0060	-0.4608	-0.5196	-0.5154
20.4420	-0.5134	-0.5723	-0.5698
21.8590	-0.5743	-0.6357	-0.6263
23.8620	-0.6757	-0.7263	-0.7252
23.9250	-0.6794	-0.7292	-0.7286
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				</tableData>
			</table>
			</product>
		<v>0</v>
		</ifthen>
		</function>

		<function name="aero/moment/Pitch_elevator">
			<description>Pitch moment due to elevator</description>
			<product>
				<property>aero/qbar-psf</property>
				<property>metrics/Sw-sqft</property>
				<property>metrics/cbarw-ft</property>
  			<interpolate1d>
    			<p> fcs/flap-pos-deg </p>
    			<v> 0 </v>  <interpolate1d>
                  	<p> aero/function/thrust-coeff-tc</p>
                  	<v> 0.00 </v>
                  	<table>
				<independentVar	lookup="row">fcs/elevator-pos-deg</independentVar>
				<independentVar	lookup="column">aero/alpha-deg</independentVar>
				<tableData>
-4	0	4	8	12	16	20
-13.8559	0.5044	0.5229	0.5370	0.5333	0.5368	0.5083	0.4176
-13.7829	0.5024	0.5209	0.5344	0.5309	0.5342	0.5058	0.4156
-13.7520	0.5015	0.5201	0.5333	0.5298	0.5331	0.5047	0.4147
-11.4228	0.4282	0.4496	0.4499	0.4492	0.4480	0.4245	0.3488
-10.6935	0.4023	0.4235	0.4233	0.4227	0.4200	0.3988	0.3280
-8.9796	0.3421	0.3585	0.3593	0.3569	0.3532	0.3367	0.2786
-8.1695	0.3149	0.3271	0.3283	0.3245	0.3213	0.3070	0.2550
-6.7798	0.2660	0.2730	0.2731	0.2679	0.2663	0.2555	0.2138
-5.7733	0.2278	0.2328	0.2323	0.2269	0.2264	0.2180	0.1828
-4.1222	0.1626	0.1662	0.1654	0.1607	0.1613	0.1561	0.1308
-2.8320	0.1108	0.1139	0.1138	0.1101	0.1108	0.1073	0.0899
-0.9358	0.0359	0.0375	0.0382	0.0363	0.0368	0.0354	0.0295
0.5452	-0.0208	-0.0218	-0.0222	-0.0212	-0.0215	-0.0206	-0.0171
2.9591	-0.1121	-0.1166	-0.1195	-0.1167	-0.1186	-0.1096	-0.0897
3.7744	-0.1427	-0.1479	-0.1514	-0.1494	-0.1506	-0.1386	-0.1134
6.3378	-0.2390	-0.2435	-0.2487	-0.2510	-0.2435	-0.2252	-0.1865
7.5699	-0.2852	-0.2881	-0.2944	-0.2978	-0.2858	-0.2643	-0.2207
7.9083	-0.2980	-0.3001	-0.3066	-0.3101	-0.2972	-0.2747	-0.2300
9.9561	-0.3749	-0.3704	-0.3767	-0.3692	-0.3643	-0.3349	-0.2831
9.9896	-0.3762	-0.3715	-0.3779	-0.3699	-0.3654	-0.3359	-0.2840
10.0216	-0.3774	-0.3726	-0.3789	-0.3706	-0.3664	-0.3368	-0.2848
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				</tableData>
                  	</table>

			<v> 0.19 </v>
                  	<table>
				<independentVar	lookup="row">fcs/elevator-pos-deg</independentVar>
				<independentVar	lookup="column">aero/alpha-deg</independentVar>
			<tableData>
-4	0	4	8	12	16	20
-13.9221	0.5487	0.6795	0.6659	0.6578	0.6495	0.7019	0.4990
-13.7872	0.5448	0.6727	0.6603	0.6519	0.6433	0.6926	0.4944
-13.7417	0.5434	0.6703	0.6584	0.6499	0.6412	0.6894	0.4929
-11.8796	0.4867	0.5772	0.5797	0.5673	0.5540	0.5583	0.4281
-11.1959	0.4641	0.5442	0.5493	0.5354	0.5211	0.5131	0.4028
-10.4410	0.4381	0.5084	0.5144	0.4992	0.4849	0.4690	0.3752
-8.6068	0.3704	0.4223	0.4259	0.4100	0.3994	0.3742	0.3106
-7.8008	0.3388	0.3841	0.3866	0.3712	0.3623	0.3322	0.2819
-5.9015	0.2618	0.2899	0.2955	0.2808	0.2752	0.2397	0.2129
-4.2672	0.1928	0.2102	0.2178	0.2030	0.1997	0.1685	0.1531
-3.6675	0.1665	0.1812	0.1889	0.1744	0.1717	0.1436	0.1313
-2.7089	0.1228	0.1345	0.1400	0.1288	0.1264	0.1050	0.0968
-1.1227	0.0505	0.0549	0.0566	0.0535	0.0513	0.0432	0.0403
-0.6935	0.0312	0.0336	0.0347	0.0331	0.0314	0.0266	0.0250
2.0070	-0.0905	-0.0972	-0.0996	-0.0959	-0.0909	-0.0766	-0.0722
2.7808	-0.1257	-0.1347	-0.1369	-0.1331	-0.1263	-0.1052	-0.1000
5.4415	-0.2494	-0.2645	-0.2629	-0.2606	-0.2522	-0.2004	-0.1965
5.8307	-0.2676	-0.2834	-0.2815	-0.2791	-0.2702	-0.2148	-0.2107
7.2457	-0.3329	-0.3502	-0.3503	-0.3461	-0.3342	-0.2695	-0.2615
8.3990	-0.3837	-0.4050	-0.4056	-0.4003	-0.3869	-0.3157	-0.3021
9.9745	-0.4490	-0.4816	-0.4716	-0.4741	-0.4615	-0.3799	-0.3570
10.0177	-0.4507	-0.4837	-0.4732	-0.4761	-0.4636	-0.3816	-0.3585
10.0391	-0.4516	-0.4848	-0.4741	-0.4771	-0.4646	-0.3825	-0.3592
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				</tableData>
                  	</table>
			<v> 0.28 </v>
                  	<table>
				<independentVar	lookup="row">fcs/elevator-pos-deg</independentVar>
				<independentVar	lookup="column">aero/alpha-deg</independentVar>
				<tableData>
-4	0	4	8	12	16	20
-13.9203	0.5644	0.7057	0.6993	0.7110	0.7069	0.7001	0.5519
-13.7660	0.5616	0.6960	0.6905	0.7023	0.6999	0.6927	0.5453
-13.6978	0.5605	0.6917	0.6866	0.6984	0.6967	0.6894	0.5424
-11.8060	0.4998	0.5767	0.5823	0.5922	0.6068	0.5979	0.4598
-11.3022	0.4801	0.5485	0.5561	0.5645	0.5813	0.5731	0.4375
-8.9870	0.3857	0.4291	0.4383	0.4416	0.4618	0.4562	0.3364
-8.2307	0.3537	0.3916	0.3997	0.4039	0.4230	0.4172	0.3047
-6.2942	0.2688	0.2953	0.2998	0.3089	0.3235	0.3175	0.2292
-5.7155	0.2435	0.2667	0.2707	0.2803	0.2932	0.2879	0.2076
-3.7478	0.1609	0.1717	0.1762	0.1825	0.1892	0.1885	0.1322
-2.7537	0.1188	0.1264	0.1296	0.1330	0.1380	0.1386	0.0952
-1.9843	0.0858	0.0916	0.0937	0.0952	0.0993	0.1000	0.0680
0.7650	-0.0332	-0.0358	-0.0367	-0.0364	-0.0387	-0.0387	-0.0264
1.6222	-0.0705	-0.0766	-0.0792	-0.0773	-0.0829	-0.0823	-0.0569
3.3367	-0.1489	-0.1594	-0.1684	-0.1603	-0.1720	-0.1701	-0.1205
4.2539	-0.1923	-0.2044	-0.2174	-0.2062	-0.2191	-0.2172	-0.1552
5.8077	-0.2687	-0.2816	-0.3001	-0.2879	-0.2969	-0.2964	-0.2147
6.8825	-0.3259	-0.3359	-0.3570	-0.3460	-0.3501	-0.3504	-0.2570
8.2238	-0.4023	-0.4053	-0.4281	-0.4186	-0.4185	-0.4175	-0.3114
8.8923	-0.4398	-0.4409	-0.4642	-0.4553	-0.4537	-0.4515	-0.3389
9.9766	-0.5037	-0.5007	-0.5277	-0.5155	-0.5115	-0.5079	-0.3836
10.0290	-0.5069	-0.5036	-0.5310	-0.5184	-0.5143	-0.5107	-0.3858
10.0424	-0.5077	-0.5043	-0.5318	-0.5192	-0.5151	-0.5114	-0.3863
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				</tableData>
                  	</table>
                </interpolate1d>
			<v> 15 </v> <interpolate1d>
                  	<p> aero/function/thrust-coeff-tc </p>
			<v> 0.00 </v>
                  	<table>
				<independentVar	lookup="row">fcs/elevator-pos-deg</independentVar>
				<independentVar	lookup="column">aero/alpha-deg</independentVar>
				<tableData>
-4	0	4	8	12	16	20
-13.7530	0.4366	0.5263	0.5068	0.5167	0.5304	0.4080	0.4325
-13.7071	0.4356	0.5247	0.5055	0.5153	0.5286	0.4068	0.4310
-13.6304	0.4340	0.5222	0.5034	0.5129	0.5257	0.4049	0.4284
-11.7051	0.3921	0.4569	0.4453	0.4534	0.4513	0.3532	0.3655
-11.6526	0.3908	0.4550	0.4435	0.4517	0.4492	0.3517	0.3639
-9.2011	0.3271	0.3615	0.3593	0.3685	0.3520	0.2837	0.2903
-8.8432	0.3164	0.3475	0.3468	0.3553	0.3379	0.2736	0.2793
-7.1110	0.2599	0.2810	0.2846	0.2880	0.2711	0.2221	0.2232
-6.6840	0.2454	0.2647	0.2683	0.2710	0.2548	0.2089	0.2091
-5.7588	0.2138	0.2291	0.2324	0.2340	0.2195	0.1800	0.1786
-4.1493	0.1592	0.1663	0.1690	0.1691	0.1580	0.1299	0.1263
-3.2148	0.1273	0.1292	0.1317	0.1310	0.1223	0.1012	0.0966
-1.6148	0.0677	0.0635	0.0661	0.0657	0.0614	0.0521	0.0481
-0.7798	0.0334	0.0303	0.0318	0.0317	0.0297	0.0259	0.0235
1.2992	-0.0560	-0.0503	-0.0528	-0.0526	-0.0497	-0.0448	-0.0395
2.2114	-0.0949	-0.0852	-0.0897	-0.0895	-0.0853	-0.0807	-0.0681
2.8956	-0.1233	-0.1113	-0.1174	-0.1170	-0.1124	-0.1086	-0.0900
4.9903	-0.2106	-0.1899	-0.2020	-0.1965	-0.1967	-0.1919	-0.1593
5.0046	-0.2112	-0.1904	-0.2026	-0.1970	-0.1972	-0.1925	-0.1598
5.0242	-0.2121	-0.1911	-0.2034	-0.1977	-0.1980	-0.1932	-0.1604
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				</tableData>
                  	</table>
			<v> 0.19 </v>
                  	<table>
				<independentVar	lookup="row">fcs/elevator-pos-deg</independentVar>
				<independentVar	lookup="column">aero/alpha-deg</independentVar>
				<tableData>
-4	0	4	8	12	16	20
-13.8337	0.5061	0.5810	0.5972	0.6632	0.6132	0.5416	0.5178
-13.7830	0.5047	0.5793	0.5952	0.6608	0.6111	0.5397	0.5159
-13.7323	0.5033	0.5775	0.5932	0.6584	0.6090	0.5378	0.5139
-13.6815	0.5019	0.5757	0.5912	0.6560	0.6068	0.5360	0.5120
-12.7181	0.4745	0.5420	0.5525	0.6103	0.5662	0.4993	0.4759
-12.1856	0.4588	0.5230	0.5297	0.5849	0.5436	0.4784	0.4561
-12.0842	0.4558	0.5193	0.5251	0.5800	0.5393	0.4744	0.4524
-11.2475	0.4298	0.4884	0.4863	0.5397	0.5030	0.4416	0.4214
-11.1460	0.4265	0.4846	0.4816	0.5347	0.4986	0.4377	0.4177
-10.7404	0.4132	0.4690	0.4634	0.5150	0.4806	0.4219	0.4026
-10.6897	0.4115	0.4670	0.4611	0.5126	0.4783	0.4199	0.4008
-10.5629	0.4072	0.4621	0.4556	0.5064	0.4726	0.4150	0.3961
-8.6613	0.3412	0.3844	0.3765	0.4139	0.3849	0.3416	0.3253
-8.3063	0.3286	0.3693	0.3616	0.3967	0.3684	0.3277	0.3120
-8.1542	0.3232	0.3628	0.3551	0.3894	0.3614	0.3217	0.3063
-8.0274	0.3187	0.3574	0.3496	0.3833	0.3555	0.3167	0.3015
-7.6471	0.3051	0.3411	0.3330	0.3649	0.3382	0.3017	0.2871
-7.5963	0.3033	0.3389	0.3307	0.3625	0.3358	0.2997	0.2852
-7.2414	0.2904	0.3235	0.3149	0.3455	0.3198	0.2856	0.2717
-5.7454	0.2333	0.2580	0.2478	0.2741	0.2534	0.2261	0.2152
-5.7201	0.2323	0.2569	0.2467	0.2729	0.2523	0.2251	0.2142
-4.4777	0.1828	0.2020	0.1928	0.2139	0.1980	0.1765	0.1681
-4.1734	0.1706	0.1886	0.1798	0.1995	0.1848	0.1649	0.1568
-3.6917	0.1511	0.1675	0.1592	0.1765	0.1638	0.1469	0.1390
-3.2099	0.1316	0.1464	0.1387	0.1536	0.1427	0.1291	0.1212
-3.0071	0.1234	0.1376	0.1300	0.1439	0.1339	0.1216	0.1137
-2.7028	0.1110	0.1243	0.1171	0.1294	0.1205	0.1102	0.1023
-2.0943	0.0862	0.0974	0.0910	0.1003	0.0938	0.0865	0.0795
-1.3590	0.0561	0.0637	0.0593	0.0650	0.0612	0.0566	0.0517
-1.2576	0.0519	0.0590	0.0549	0.0602	0.0567	0.0524	0.0478
-0.7505	0.0311	0.0353	0.0330	0.0358	0.0340	0.0312	0.0285
-0.6744	0.0280	0.0318	0.0298	0.0322	0.0306	0.0280	0.0256
-0.6237	0.0259	0.0294	0.0276	0.0298	0.0283	0.0259	0.0237
0.7708	-0.0320	-0.0363	-0.0341	-0.0368	-0.0350	-0.0320	-0.0293
0.8469	-0.0351	-0.0399	-0.0377	-0.0404	-0.0384	-0.0351	-0.0322
1.2525	-0.0522	-0.0590	-0.0575	-0.0596	-0.0570	-0.0515	-0.0475
1.9625	-0.0823	-0.0922	-0.0945	-0.0929	-0.0896	-0.0796	-0.0742
2.1907	-0.0921	-0.1028	-0.1068	-0.1036	-0.1001	-0.0884	-0.0827
2.6978	-0.1139	-0.1261	-0.1344	-0.1273	-0.1235	-0.1079	-0.1016
2.7231	-0.1150	-0.1272	-0.1358	-0.1285	-0.1247	-0.1089	-0.1026
3.3063	-0.1405	-0.1535	-0.1672	-0.1558	-0.1516	-0.1311	-0.1242
3.3316	-0.1416	-0.1546	-0.1685	-0.1570	-0.1528	-0.1321	-0.1252
3.3570	-0.1427	-0.1557	-0.1699	-0.1582	-0.1540	-0.1330	-0.1261
5.0051	-0.2156	-0.2240	-0.2505	-0.2378	-0.2305	-0.1965	-0.1870
5.0304	-0.2168	-0.2250	-0.2517	-0.2390	-0.2316	-0.1975	-0.1880
5.0811	-0.2190	-0.2269	-0.2541	-0.2415	-0.2340	-0.1995	-0.1898
				</tableData>
                  	</table>
			<v> 0.28 </v>
                  	<table>
				<independentVar	lookup="row">fcs/elevator-pos-deg</independentVar>
				<independentVar	lookup="column">aero/alpha-deg</independentVar>
				<tableData>
-4	0	4	8	12	16	20
-13.7420	0.5439	0.7911	0.6609	0.7270	0.6927	0.0377	0.5546
-13.7344	0.5435	0.7908	0.6605	0.7266	0.6924	0.0373	0.5543
-13.5873	0.5377	0.7853	0.6521	0.7179	0.6848	0.0285	0.5485
-12.1893	0.4826	0.7321	0.5751	0.6406	0.6138	-0.0468	0.4929
-11.2308	0.4448	0.6934	0.5274	0.5936	0.5658	-0.0913	0.4536
-10.1884	0.4038	0.6478	0.4767	0.5447	0.5140	-0.1383	0.4103
-8.6999	0.3458	0.5785	0.4046	0.4754	0.4395	-0.2040	0.3484
-8.3174	0.3310	0.5605	0.3861	0.4572	0.4202	-0.2205	0.3326
-6.6713	0.2660	0.4858	0.3073	0.3757	0.3363	-0.2901	0.2654
-6.1170	0.2430	0.4612	0.2819	0.3475	0.3081	-0.3133	0.2438
-4.4172	0.1730	0.3872	0.2059	0.2608	0.2221	-0.3845	0.1800
-3.6840	0.1447	0.3563	0.1729	0.2237	0.1852	-0.4146	0.1523
-2.2203	0.0904	0.2953	0.1042	0.1508	0.1117	-0.4730	0.0933
-1.6817	0.0697	0.2725	0.0786	0.1249	0.0847	-0.4948	0.0693
-0.6472	0.0278	0.2278	0.0303	0.0756	0.0327	-0.5375	0.0246
1.1801	-0.0513	0.1446	-0.0555	-0.0148	-0.0598	-0.6141	-0.0443
2.1471	-0.0956	0.0966	-0.1018	-0.0627	-0.1092	-0.6551	-0.0804
3.2494	-0.1475	0.0398	-0.1549	-0.1166	-0.1654	-0.7024	-0.1234
3.7950	-0.1733	0.0125	-0.1812	-0.1429	-0.1931	-0.7254	-0.1453
5.0277	-0.2298	-0.0473	-0.2402	-0.2020	-0.2551	-0.7733	-0.1958
5.0760	-0.2320	-0.0496	-0.2426	-0.2043	-0.2575	-0.7751	-0.1978
5.0815	-0.2323	-0.0499	-0.2428	-0.2045	-0.2578	-0.7753	-0.1980
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			</tableData>
                  </table>
                	</interpolate1d>

			<v> 35 </v> <interpolate1d>
                	<p> aero/function/thrust-coeff-tc </p>
			<v> 0.00 </v>
                  	<table>
				<independentVar	lookup="row">fcs/elevator-pos-deg</independentVar>
				<independentVar	lookup="column">aero/alpha-deg</independentVar>
				<tableData>
-4	0	4	8	12	16	20
-13.8665	0.4672	0.4707	0.4964	0.5148	0.5713	0.3559	0.3266
-13.7692	0.4546	0.4677	0.4933	0.5110	0.5666	0.3540	0.3241
-13.7303	0.4502	0.4665	0.4921	0.5095	0.5647	0.3532	0.3231
-11.8159	0.4037	0.4071	0.4299	0.4371	0.4731	0.3098	0.2801
-11.3852	0.3923	0.3937	0.4153	0.4214	0.4532	0.2985	0.2721
-8.8837	0.3119	0.3152	0.3277	0.3309	0.3419	0.2306	0.2242
-7.8632	0.2789	0.2815	0.2910	0.2932	0.2985	0.2049	0.2015
-6.2719	0.2263	0.2232	0.2329	0.2333	0.2345	0.1652	0.1621
-5.7554	0.2087	0.2053	0.2139	0.2137	0.2142	0.1511	0.1486
-2.8295	0.1038	0.1102	0.1058	0.1032	0.1019	0.0704	0.0708
-2.2962	0.0843	0.0907	0.0861	0.0835	0.0820	0.0567	0.0571
0.5643	-0.0207	-0.0226	-0.0213	-0.0204	-0.0197	-0.0138	-0.0140
1.3062	-0.0481	-0.0515	-0.0504	-0.0475	-0.0447	-0.0323	-0.0324
3.2995	-0.1239	-0.1242	-0.1293	-0.1230	-0.1103	-0.0850	-0.0822
4.2444	-0.1615	-0.1588	-0.1654	-0.1590	-0.1415	-0.1093	-0.1059
6.8069	-0.2636	-0.2650	-0.2604	-0.2536	-0.2266	-0.1680	-0.1695
7.7074	-0.2990	-0.3007	-0.2932	-0.2862	-0.2563	-0.1851	-0.1910
7.8147	-0.3032	-0.3049	-0.2971	-0.2900	-0.2598	-0.1869	-0.1935
10.0267	-0.3867	-0.3880	-0.3765	-0.3687	-0.3299	-0.2066	-0.2441
10.0751	-0.3885	-0.3898	-0.3782	-0.3704	-0.3314	-0.2067	-0.2451
10.1012	-0.3895	-0.3908	-0.3791	-0.3713	-0.3322	-0.2067	-0.2457
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				</tableData>
                  	</table>
			<v> 0.19 </v>
                  	<table>
				<independentVar	lookup="row">fcs/elevator-pos-deg</independentVar>
				<independentVar	lookup="column">aero/alpha-deg</independentVar>
				<tableData>
-4	0	4	8	12	16	20
-13.8983	0.4843	0.5259	0.5931	0.6189	0.6250	0.5631	0.4426
-13.7927	0.4815	0.5217	0.5877	0.6147	0.6203	0.5573	0.4379
-13.6949	0.4789	0.5179	0.5828	0.6108	0.6159	0.5519	0.4334
-11.7526	0.4260	0.4417	0.4880	0.5292	0.5289	0.4568	0.3554
-11.0197	0.4051	0.4131	0.4556	0.4961	0.4962	0.4235	0.3308
-8.7010	0.3335	0.3248	0.3600	0.3882	0.3923	0.3207	0.2577
-7.8352	0.3046	0.2935	0.3251	0.3480	0.3529	0.2835	0.2309
-6.5985	0.2617	0.2478	0.2743	0.2916	0.2957	0.2333	0.1924
-4.1721	0.1713	0.1543	0.1722	0.1845	0.1836	0.1413	0.1180
-2.5683	0.1059	0.0936	0.1049	0.1147	0.1121	0.0841	0.0712
-1.1105	0.0449	0.0405	0.0450	0.0503	0.0484	0.0353	0.0306
0.8998	-0.0360	-0.0332	-0.0364	-0.0410	-0.0392	-0.0282	-0.0247
2.2799	-0.0918	-0.0873	-0.0934	-0.1047	-0.1003	-0.0702	-0.0618
3.1401	-0.1274	-0.1228	-0.1296	-0.1444	-0.1391	-0.0962	-0.0844
6.3415	-0.2634	-0.2618	-0.2683	-0.2918	-0.2860	-0.1954	-0.1674
7.4632	-0.3112	-0.3125	-0.3188	-0.3449	-0.3378	-0.2293	-0.1967
9.9810	-0.4130	-0.4293	-0.4376	-0.4755	-0.4533	-0.2902	-0.2630
10.0096	-0.4141	-0.4307	-0.4390	-0.4771	-0.4546	-0.2907	-0.2637
10.0820	-0.4168	-0.4341	-0.4425	-0.4811	-0.4580	-0.2921	-0.2657
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				</tableData>
                  	</table>
			<v> 0.28 </v>
                  	<table>
				<independentVar	lookup="row">fcs/elevator-pos-deg</independentVar>
				<independentVar	lookup="column">aero/alpha-deg</independentVar>
				<tableData>
-4	0	4	8	12	16	20
-13.8187	0.4756	0.5966	0.6301	0.6378	0.6449	0.5145	0.4605
-13.7162	0.4730	0.5922	0.6246	0.6335	0.6410	0.5109	0.4576
-13.6476	0.4713	0.5892	0.6210	0.6307	0.6384	0.5085	0.4556
-11.7677	0.4236	0.5075	0.5237	0.5469	0.5601	0.4390	0.4002
-9.3518	0.3599	0.4020	0.4062	0.4310	0.4435	0.3426	0.3179
-8.6745	0.3405	0.3722	0.3751	0.4004	0.4106	0.3172	0.2936
-7.1792	0.2882	0.3059	0.3095	0.3351	0.3400	0.2647	0.2407
-6.0197	0.2370	0.2539	0.2594	0.2838	0.2856	0.2237	0.2017
-4.2574	0.1671	0.1761	0.1822	0.2033	0.2003	0.1583	0.1440
-2.7114	0.1078	0.1141	0.1148	0.1309	0.1258	0.1004	0.0927
-1.5010	0.0608	0.0646	0.0635	0.0732	0.0693	0.0555	0.0516
0.5194	-0.0214	-0.0226	-0.0224	-0.0255	-0.0240	-0.0193	-0.0179
1.6762	-0.0704	-0.0733	-0.0751	-0.0831	-0.0782	-0.0623	-0.0574
3.3271	-0.1419	-0.1459	-0.1536	-0.1660	-0.1575	-0.1220	-0.1124
4.3094	-0.1847	-0.1889	-0.2008	-0.2157	-0.2048	-0.1559	-0.1449
7.2088	-0.3088	-0.3137	-0.3415	-0.3656	-0.3431	-0.2549	-0.2422
7.2588	-0.3109	-0.3158	-0.3440	-0.3682	-0.3456	-0.2567	-0.2438
9.9453	-0.4164	-0.4282	-0.4871	-0.5159	-0.4826	-0.3534	-0.3346
10.0162	-0.4191	-0.4312	-0.4911	-0.5198	-0.4863	-0.3560	-0.3370
10.0707	-0.4212	-0.4334	-0.4943	-0.5228	-0.4891	-0.3580	-0.3388
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				</tableData>
                  	</table>
                	</interpolate1d>
  		</interpolate1d>
			</product>
		</function>

		<function name="aero/moment/pitch_elev14-25">
			<description>additional pitch moment extending for not measuered values</description>
			<product>
				<property>aero/qbar-psf</property>
				<property>metrics/Sw-sqft</property>
				<property>metrics/cbarw-ft</property>
				<table>
					<independentVar>fcs/elevator-pos-deg</independentVar>
					<tableData>
					13.93	0
					25	0.33
					</tableData>
				</table>
			</product>
		</function>


		<function name="aero/moment/pitch_flap45">
			<description>additional pitch moment flaps gt 35</description>
			<product>
				<property>aero/qbar-psf</property>
				<property>metrics/Sw-sqft</property>
				<property>metrics/cbarw-ft</property>
				<table>
					<independentVar>fcs/flap-pos-deg</independentVar>
					<tableData>
					35	0
					45	0.0094
					</tableData>
				</table>
			</product>
		</function>

		<function name="aero/moment/Pitch_damp">
			<description>Pitch moment due to pitch rate</description>
			<product>
				<property>aero/qbar-psf</property>
				<property>metrics/Sw-sqft</property>
				<property>metrics/cbarw-ft</property>
				<property>aero/ci2vel</property>
				<property>velocities/q-aero-rad_sec</property>
				<property>aero/function/easymode_cmq</property>
				<value>-26.3</value>
			</product>
		</function>

		<function name="aero/moment/Pitch_alphadot">
			<description>Pitch moment due to alpha rate</description>
			<product>
				<property>aero/qbarUW-psf</property>
				<property>metrics/Sw-sqft</property>
				<property>metrics/cbarw-ft</property>
				<property>aero/ci2vel</property>
				<property>aero/alphadot-rad_sec</property>
				<value>-1.6</value> <!-- * -->
			</product>
		</function>

		<function name="aero/moment/Pitch_gear">
			<description>Pitch moment gear</description>
			<product>
				<property>aero/qbar-psf</property>
				<property>metrics/Sw-sqft</property>
				<property>metrics/cbarw-ft</property>
				<property>gear/gear-pos-norm</property>
				<value>0.02</value>
				<value>-0.75</value>
			</product>
		</function>

		<function name="aero/moment/Pitch_ice">
			<description>Pitch moment by ice</description>
			<product>
				<property>aero/qbar-psf</property>
				<property>metrics/Sw-sqft</property>
				<property>metrics/cbarw-ft</property>
				<property>aero/function/runtime_ice</property>
				<table>
					<independentVar	lookup="row">aero/alpha-deg</independentVar>
					<independentVar	lookup="column">fcs/flap-pos-deg</independentVar>
					<tableData>
							0	35
						0	0	-0.01
						2	-0.01	-0.01
						4	-0.02	-0.01
						6	-0.05	-0.02
						8	-0.06	-0.08
						10	-0.09	-0.12
						12	-0.11	-0.15
						14	-0.22	0.02
						16	-0.125	0
						18	-0.1	-0.06
						20	-0.05	-0.08
				</tableData>
				</table>
			</product>
		</function>

	<function name="aero/function/easymode_pitch">
			<description>increased pitch gradient</description>
			<product>
				<property>aero/qbar-psf</property>
				<property>metrics/Sw-sqft</property>
				<property>metrics/cbarw-ft</property>
				<ifthen>
					<p>/sim/realism/realistic-fdm</p>
					<v>0</v>
				<table>
					<independentVar>aero/alpha-deg</independentVar>
					<tableData>
						-10	0.5
						-5	0.1
						5	-0.1
						10	-0.2
						20	-0.5
					</tableData>
				</table>
				</ifthen>
			</product>
	</function>


	</axis>

	<axis name="ROLL">

		<function name="aero/moment/roll_base_sym">
			<description>roll moment both engines symmetric</description>
			<ifthen>
			<eq><p>aero/function/thrust-state-sym</p><v>1</v></eq>
			<product>
				<property>aero/qbar-psf</property>
				<property>metrics/Sw-sqft</property>
				<property>metrics/bw-ft</property>
				<value>0.0</value>  <!-- test only -->
				<table>
				<independentVar	lookup="row">aero/alpha-deg</independentVar>
				<independentVar	lookup="column">aero/function/thrust-state</independentVar>
				<tableData>
-0.1	0	0.19	0.28
-5.000000	0.000000	-0.001257	-0.001257	-0.001257
0.000000	0.000000	0.001005	0.002003	0.002003
5.000000	0.000000	-0.006315	0.003523	0.003523
10.000000	0.000000	0.001301	0.003304	0.003304
15.000000	0.000000	-0.000657	0.001346	0.001346
20.000000	0.000000	-0.004354	-0.002351	-0.002351
				</tableData>
				</table>
			</product>
			<v>0</v>
			</ifthen>
		</function>

		<function name="aero/moment/roll_base_asym">
			<description>roll moment due to asymmetric lift</description>
			<ifthen>
			<eq><p>aero/function/thrust-state-sym</p><v>0</v></eq>
			<product>
				<property>aero/qbar-psf</property>
				<property>metrics/Sw-sqft</property>
				<property>metrics/bw-ft</property>
				<table>
				<independentVar	lookup="row">aero/alpha-deg</independentVar>
				<independentVar	lookup="column">aero/function/power-balance</independentVar>
				<independentVar	lookup="table">fcs/flap-pos-deg</independentVar>
				<tableData	breakPoint="0">
-1	0	1
-4.01180	-0.00308	0.00034	-0.00219
-2.47650	-0.00200	0.00035	-0.00461
-1.17600	-0.00047	0.00114	-0.00304
1.40590	0.00377	0.00460	0.00075
3.25400	0.00446	0.00503	-0.00230
5.64540	0.00389	0.00298	-0.00689
7.31590	0.00745	0.00177	-0.00956
9.82920	0.01415	0.00049	-0.01534
12.62120	0.01344	-0.00082	-0.02668
13.86620	0.01416	-0.00136	-0.02765
15.46190	0.02211	0.00209	-0.02180
16.85000	0.02252	0.00565	-0.02326
17.49740	0.01783	0.00481	-0.02979
18.19270	0.01412	0.00409	-0.03467
19.28280	0.01742	0.00058	-0.03142
19.82690	0.02173	-0.00210	-0.02917
20.54990	0.02090	-0.00337	-0.03255
22.26000	0.01629	-0.00778	-0.04717
23.26790	0.01920	-0.01061	-0.05311
24.09080	0.02327	-0.01288	-0.06227
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

				</tableData>
				<tableData	breakPoint="35">
	-1	0	1
-4.37010	0.00274	0.00381	-0.00637
-2.85380	0.00464	0.00243	-0.00742
-1.02550	0.00376	0.00013	-0.00770
2.35930	0.00443	0.00072	-0.01003
4.58080	0.00790	0.00211	-0.01435
6.95900	0.01230	0.00230	-0.01833
10.77880	0.02104	0.00092	-0.02715
13.52530	0.03652	0.00144	-0.04009
14.35320	0.04364	-0.00006	-0.03823
15.45440	0.04822	-0.00803	-0.02443
16.31230	0.04618	-0.00646	-0.02425
16.71600	0.04216	0.00248	-0.03300
17.51830	0.03063	0.01942	-0.05168
18.24080	0.02330	0.02568	-0.06176
19.04710	0.02884	0.01465	-0.05424
19.96430	0.02453	0.00740	-0.04959
21.42210	0.03042	0.00187	-0.04831
22.02830	0.03151	-0.00103	-0.04722
23.94550	0.03064	-0.00868	-0.04328
24.19260	0.03045	-0.00964	-0.04268
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
				</tableData>
				</table>
			</product>
			<v>0</v>
			</ifthen>
		</function>

		<function name="aero/moment/Roll_beta">
			<description>Roll moment due to beta</description>
			<product>
				<property>aero/qbar-psf</property>
				<property>metrics/Sw-sqft</property>
				<property>metrics/bw-ft</property>
				<property>aero/beta-deg</property>
				<property>aero/function/modelfactor_clbeta</property>
				<property>aero/function/easymode_clb</property>
				<table>
				<independentVar	lookup="row">aero/alpha-deg</independentVar>
				<independentVar	lookup="column">fcs/flap-pos-deg</independentVar>
				<independentVar	lookup="table">aero/function/thrust-state</independentVar>
				<tableData	breakPoint="0">
				0	15	35
-0.0464	-0.0026	-0.0027	-0.0023
-0.0440	-0.0026	-0.0027	-0.0023
-0.0352	-0.0026	-0.0027	-0.0023
1.8742	-0.0028	-0.0027	-0.0024
2.4105	-0.0028	-0.0027	-0.0024
2.7750	-0.0028	-0.0026	-0.0024
4.1532	-0.0029	-0.0026	-0.0025
5.4116	-0.0030	-0.0026	-0.0025
6.2883	-0.0031	-0.0025	-0.0026
6.6717	-0.0031	-0.0025	-0.0026
7.6508	-0.0032	-0.0025	-0.0026
7.6922	-0.0032	-0.0025	-0.0026
8.4510	-0.0032	-0.0026	-0.0027
9.1682	-0.0033	-0.0027	-0.0028
9.2166	-0.0033	-0.0027	-0.0028
9.2299	-0.0033	-0.0027	-0.0028
10.2690	-0.0033	-0.0029	-0.0029
10.6373	-0.0033	-0.0030	-0.0030
11.3265	-0.0034	-0.0032	-0.0030
11.3645	-0.0034	-0.0032	-0.0030
11.5693	-0.0034	-0.0032	-0.0031
11.7588	-0.0034	-0.0033	-0.0031
12.1276	-0.0034	-0.0033	-0.0031
12.1984	-0.0034	-0.0033	-0.0031
13.2877	-0.0035	-0.0033	-0.0030
13.6062	-0.0035	-0.0033	-0.0029
13.7513	-0.0035	-0.0033	-0.0029
14.2937	-0.0035	-0.0032	-0.0028
15.2807	-0.0036	-0.0032	-0.0024
15.9329	-0.0036	-0.0032	-0.0021
15.9414	-0.0036	-0.0032	-0.0021
15.9437	-0.0036	-0.0032	-0.0021
				</tableData>
				<tableData	breakPoint="0.19">
				0	15	35
-0.0448	-0.0022	-0.0027	-0.0019
-0.0011	-0.0022	-0.0027	-0.0019
0.0988	-0.0022	-0.0027	-0.0019
1.7001	-0.0023	-0.0027	-0.0019
1.8189	-0.0023	-0.0027	-0.0019
2.9647	-0.0024	-0.0026	-0.0019
2.9742	-0.0024	-0.0026	-0.0019
3.5790	-0.0024	-0.0026	-0.0019
4.0820	-0.0025	-0.0026	-0.0019
4.7469	-0.0027	-0.0026	-0.0020
4.8978	-0.0027	-0.0026	-0.0020
5.4935	-0.0029	-0.0026	-0.0022
5.7592	-0.0030	-0.0026	-0.0024
5.7758	-0.0030	-0.0026	-0.0024
6.1147	-0.0032	-0.0025	-0.0025
6.3961	-0.0033	-0.0025	-0.0027
6.7361	-0.0034	-0.0025	-0.0028
6.9657	-0.0035	-0.0025	-0.0029
7.2336	-0.0035	-0.0025	-0.0029
7.5911	-0.0036	-0.0025	-0.0030
7.6583	-0.0036	-0.0025	-0.0030
8.0246	-0.0036	-0.0025	-0.0031
8.6354	-0.0036	-0.0026	-0.0032
8.7636	-0.0036	-0.0026	-0.0033
8.7869	-0.0036	-0.0026	-0.0033
9.5043	-0.0036	-0.0027	-0.0034
9.5200	-0.0036	-0.0027	-0.0034
10.4677	-0.0036	-0.0031	-0.0036
10.7822	-0.0036	-0.0032	-0.0036
10.9548	-0.0036	-0.0032	-0.0036
11.1920	-0.0036	-0.0033	-0.0037
11.3344	-0.0036	-0.0033	-0.0037
12.0354	-0.0036	-0.0034	-0.0037
12.0425	-0.0036	-0.0034	-0.0037
12.3646	-0.0036	-0.0034	-0.0037
13.0523	-0.0037	-0.0034	-0.0036
13.1836	-0.0037	-0.0034	-0.0036
13.7269	-0.0037	-0.0034	-0.0035
14.0342	-0.0037	-0.0033	-0.0034
14.6094	-0.0038	-0.0033	-0.0032
15.0537	-0.0038	-0.0033	-0.0030
15.5244	-0.0039	-0.0032	-0.0027
15.8944	-0.0039	-0.0032	-0.0024
15.9053	-0.0039	-0.0032	-0.0024
15.9672	-0.0039	-0.0032	-0.0024
				</tableData>
				<tableData	breakPoint="0.28">
				0	15	35
-0.0274	-0.0028	-0.0020	-0.0020
3.5647	-0.0030	-0.0029	-0.0027
7.1596	-0.0031	-0.0032	-0.0022
9.0698	-0.0032	-0.0027	-0.0023
11.0135	-0.0034	-0.0027	-0.0020
13.4820	-0.0036	-0.0022	-0.0018
15.9466	-0.0036	-0.0011	-0.0021
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				</tableData>
			</table>
			</product>

		</function>
		<function name="aero/moment/Roll_damp">
			<description>Roll moment due to roll rate</description>
			<product>
				<property>aero/qbar-psf</property>
				<property>metrics/Sw-sqft</property>
				<property>metrics/bw-ft</property>
				<property>aero/bi2vel</property>
				<property>velocities/p-aero-rad_sec</property>
				<property>aero/function/easymode_clp</property>
				<table>
					<independentVar lookup="row">aero/alpha-deg</independentVar>
					<tableData>
					-5	-0.575
					0	-0.597
					5	-0.608
					10	-0.586
					</tableData>
				</table>
			</product>
		</function>


		<function name="aero/moment/Roll_yaw">
			<description>Roll moment due to yaw rate</description>
			<product>
				<property>aero/qbar-psf</property>
				<property>metrics/Sw-sqft</property>
				<property>metrics/bw-ft</property>
				<property>aero/bi2vel</property>
				<property>velocities/r-aero-rad_sec</property>
				<table>
					<independentVar lookup="row">aero/alpha-deg</independentVar>
					<tableData>
						-5	0.0113
						0	0.069
						5	0.128
						10	0.19
					</tableData>
				</table>
			</product>
		</function>

		<function name="aero/moment/Roll_aileron">
			<description>Roll moment due to aileron</description>
			<product>
				<property>aero/qbar-psf</property>
				<property>metrics/Sw-sqft</property>
				<property>metrics/bw-ft</property>
				<property>fcs/aileron-pos-deg</property>
				<value>-1</value>
				<table>
				<independentVar	lookup="row">aero/alpha-deg</independentVar>
				<independentVar	lookup="column">fcs/flap-pos-deg</independentVar>
				<independentVar	lookup="table">aero/function/thrust-state</independentVar>
				<tableData	breakPoint="0">
			0 35
0.0114	-0.0018	-0.0017
3.7544	-0.0018	-0.0019
6.6523	-0.0018	-0.0019
9.7679	-0.0017	-0.0017
13.1540	-0.0015	-0.0016
15.9205	-0.0015	-0.0018
15.9746	-0.0015	-0.0018
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				</tableData>
				<tableData	breakPoint="0.19">
0	35
0.0251	-0.0016	-0.0017
3.0119	-0.0016	-0.0017
5.8886	-0.0016	-0.0017
8.8135	-0.0016	-0.0017
11.6666	-0.0017	-0.0017
14.1613	-0.0016	-0.0016
15.9636	-0.0015	-0.0015
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				</tableData>
				<tableData	breakPoint="0.28">
0	35
0.5277	-0.0018	-0.0018
2.7777	-0.0019	-0.0019
5.8400	-0.0020	-0.0020
8.7418	-0.0019	-0.0019
11.4113	-0.0018	-0.0017
13.6449	-0.0017	-0.0016
15.8862	-0.0016	-0.0016
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				</tableData>
			</table>
			</product>
		</function>

		<function name="aero/moment/Roll_rudder">
			<description>Roll moment due to rudder</description>
			<product>
				<property>aero/qbar-psf</property>
				<property>metrics/Sw-sqft</property>
				<property>metrics/bw-ft</property>
				<table>
				<independentVar	lookup="row">fcs/rudder-pos-deg</independentVar>
				<independentVar	lookup="column">aero/alpha-deg</independentVar>
				<tableData>
	0	6	12	16
-25.041500	-0.014425	-0.002961	-0.002961	0.009474
-21.533900	-0.010393	-0.004603	-0.004603	0.004073
-14.913100	-0.005825	-0.003715	-0.003715	0.006885
-3.878600	-0.001087	-0.000907	-0.000907	0.000599
4.222400	0.001060	0.000933	0.000933	0.001797
17.257300	0.003940	0.003960	0.003960	0.004951
25.001200	0.007520	0.005729	0.005729	0.004932
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				</tableData>
				</table>
			</product>
		</function>
	</axis>

	<axis name="YAW">
		<!-- Stall initiator --> <!-- * -->
		<!--<function name="aero/moment/Yaw_alpha">
			<description>Yaw moment due to alpha</description>
			<product>
				<property>aero/qbar-psf</property>
				<property>metrics/Sw-sqft</property>
				<property>metrics/bw-ft</property>
				<property>aero/alpha-rad</property>
				<table>
					<independentVar lookup="row">aero/beta-rad</independentVar>
					<independentVar lookup="column">aero/Re</independentVar>
					<tableData>
									3187609     3506370
						-0.3491		-1			0
						0.3491		1			0
					</tableData>
				</table>
			</product>
		</function>-->


		<!--<function name="aero/moment/Yaw_base">
			<description>Yaw moment base</description>
			<product>
				<property>aero/qbar-psf</property>
				<property>metrics/Sw-sqft</property>
				<property>metrics/bw-ft</property>
				<interpolate1d>
					<property>aero/function/thrust-state</property>
					<v>-0.1</v>
					<v>0</v>
					<v>0</v>
					<interpolate1d>
						<property>fcs/flap-pos-deg</property>
						<v>0</v>
						<table>
							<independentVar lookup="row">aero/alpha-deg</independentVar>
							<tableData>
								-3.9507	-0.0014
								-3.7013	-0.0015
								3.7802	-0.0005
								11.7584	0.0005
								16.8917	0.0002
								20.2314	0.0014
								23.1382	-0.0006
								24.1169	-0.0041
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							</tableData>
						</table>
						<v>15</v>
						<table>
							<independentVar lookup="row">aero/alpha-deg</independentVar>
							<tableData>
								-4.0428	0.0008
								-3.9607	0.0008
								3.4165	-0.0003
								9.4742	-0.0018
								16.3602	0.0010
								21.2298	0.0028
								22.7892	-0.0020
								24.0487	-0.0064
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							</tableData>
						</table>
						<v>35</v>
						<table>
							<independentVar lookup="row">aero/alpha-deg</independentVar>
							<tableData>
								-4.0270	-0.0067
								-3.1701	-0.0060
								2.9528	-0.0043
								9.1034	0.0015
								13.6097	-0.0002
								17.6807	-0.0057
								21.8990	-0.0127
								24.1796	-0.0088
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							</tableData>
						</table>
					</interpolate1d>
					<v>0.19</v>
					<interpolate1d>
						<property>fcs/flap-pos-deg</property>
						<v>0</v>
						<table>
							<independentVar lookup="row">aero/alpha-deg</independentVar>
							<tableData>
								-3.9648	-0.0027
								-3.6584	-0.0028
								2.9822	-0.0035
								10.3568	-0.0022
								14.8987	-0.0052
								18.7055	-0.0067
								21.9721	-0.0091
								24.0679	-0.0091
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							</tableData>
						</table>
						<v>15</v>
						<table>
							<independentVar lookup="row">aero/alpha-deg</independentVar>
							<tableData>
								-3.9328	-0.0014
								-3.8912	-0.0014
								1.8714	-0.0028
								8.6723	-0.0034
								12.9966	-0.0050
								15.9579	-0.0095
								20.5200	-0.0056
								23.9496	-0.0078
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							</tableData>
						</table>
						<v>35</v>
						<table>
							<independentVar lookup="row">aero/alpha-deg</independentVar>
							<tableData>
								-4.0772	-0.0093
								-3.9759	-0.0093
								1.8121	-0.0087
								7.1477	-0.0014
								10.6463	-0.0115
								14.6980	-0.0117
								20.7940	-0.0154
								24.0604	-0.0072
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							</tableData>
						</table>
					</interpolate1d>
					<v>0.28</v>
					<interpolate1d>
						<property>fcs/flap-pos-deg</property>
						<v>0</v>
						<table>
							<independentVar lookup="row">aero/alpha-deg</independentVar>
							<tableData>
								-3.8678	-0.0027
								-3.8400	-0.0027
								4.7097	-0.0053
								11.2348	-0.0076
								15.0874	-0.0129
								19.2888	-0.0162
								21.7038	-0.0069
								24.0179	-0.0061
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							</tableData>
						</table>
						<v>15</v>
						<table>
							<independentVar lookup="row">aero/alpha-deg</independentVar>
							<tableData>
								-4.0008	-0.0029
								-3.8299	-0.0030
								2.4118	-0.0047
								7.8332	-0.0057
								11.5725	-0.0081
								15.8200	-0.0078
								20.2583	-0.0068
								24.0402	-0.0089
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							</tableData>
						</table>
						<v>35</v>
						<table>
							<independentVar lookup="row">aero/alpha-deg</independentVar>
							<tableData>
								-4.0336	-0.0088
								-3.9177	-0.0087
								0.7059	-0.0099
								4.0860	-0.0095
								7.8151	-0.0091
								11.7479	-0.0164
								14.6218	-0.0180
								18.4034	-0.0189
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							</tableData>
						</table>
					</interpolate1d>
				</interpolate1d>
			</product>
		</function>-->

		<function name="aero/moment/Yaw_beta">
			<description>Yaw moment due to beta</description>
			<product>
				<property>aero/qbar-psf</property>
				<property>metrics/Sw-sqft</property>
				<property>metrics/bw-ft</property>
				<property>aero/beta-deg</property>
				<property>aero/function/modelfactor_cnbeta</property>
				<property>aero/function/easymode_cnb</property>
				<table>
				<independentVar	lookup="row">aero/alpha-deg</independentVar>
				<independentVar	lookup="column">fcs/flap-pos-deg</independentVar>
				<independentVar	lookup="table">aero/function/thrust-state</independentVar>
				<tableData	breakPoint="0.0">
					0	15	35
					-0.0265	0.0027	0.0027	0.0029
					3.0926	0.0025	0.0026	0.0028
					6.3164	0.0020	0.0022	0.0026
					9.5372	0.0019	0.0017	0.0021
					11.6726	0.0019	0.0013	0.0016
					13.9139	0.0019	0.0013	0.0020
					16.0481	0.0018	0.0015	0.0028
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				</tableData>
				<tableData	breakPoint="0.19">
							0		15		35
					-0.0079	0.0024	0.0026	0.0027
					3.3875	0.0024	0.0023	0.0025
					6.6092	0.0018	0.0025	0.0022
					8.9724	0.0013	0.0022	0.0016
					11.4007	0.0012	0.0018	0.0008
					13.8505	0.0018	0.0017	0.0012
					16.0632	0.0031	0.0019	0.0025
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				</tableData>
				<tableData	breakPoint="0.28">
							0		15		35
					-0.0425	0.0024	0.0026	0.0027
					2.8686	0.0023	0.0020	0.0021
					6.2248	0.0017	0.0018	0.0015
					8.9953	0.0011	0.0017	0.0016
					11.6856	0.0008	0.0016	0.0022
					14.4709	0.0014	0.0016	0.0026
					16.0271	0.0022	0.0018	0.0027
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			</tableData>
			</table>
			</product>
		</function>

		<function name="aero/moment/Yaw_roll_rate">
			<description>Yaw moment due to roll rate</description>
			<product>
				<property>aero/qbar-psf</property>
				<property>metrics/Sw-sqft</property>
				<property>metrics/bw-ft</property>
				<property>aero/bi2vel</property>
				<property>velocities/p-rad_sec</property>
				<table>
					<independentVar lookup="row">aero/alpha-deg</independentVar>
					<tableData>
						0	-0.02517
						5	-0.0615
						6.6	-0.1021
					</tableData>
				</table>
			</product>
		</function>

		<function name="aero/moment/Yaw_damp">
			<description>Yaw moment due to yaw rate</description>
			<product>
				<property>aero/qbar-psf</property>
				<property>metrics/Sw-sqft</property>
				<property>metrics/bw-ft</property>
				<property>aero/bi2vel</property>
				<property>velocities/r-aero-rad_sec</property>
				<property>aero/function/modelfactor_cnr</property>
				<property>aero/function/easymode_cnr</property>
				<table>
					<independentVar lookup="row">aero/alpha-deg</independentVar>
					<tableData>
						-5	-0.272
						0	-0.279
						5	-0.291
						10	-0.275
					</tableData>
				</table>
			</product>
		</function>
<!--
		<function name="aero/moment/Yaw_dampbetadot">
			<description>Yaw moment due to beta change </description>
			<product>
				<property>aero/qbar-psf</property>
				<property>metrics/Sw-sqft</property>
				<property>metrics/bw-ft</property>
				<property>aero/bi2vel</property>
				<property>aero/betadot-rad_sec</property>
				<property>aero/function/modelfactor_cnr</property>
				<value>
					-0.15
				</value>
			</product>
		</function>
-->

		<function name="aero/moment/Yaw_rudder_sym">
			<description>Yaw moment due to rudder sym</description>
			<ifthen>
			<eq><p>aero/function/thrust-state-sym</p><v>1</v></eq>
			<product>
				<property>aero/qbar-psf</property>
				<property>metrics/Sw-sqft</property>
				<property>metrics/bw-ft</property>
				<property>fcs/rudder-pos-deg</property>
				<table>
				<independentVar	lookup="row">aero/alpha-deg</independentVar>
				<independentVar	lookup="column">fcs/flap-pos-deg</independentVar>
				<independentVar	lookup="table">aero/function/thrust-coeff-tc</independentVar>
				<tableData	breakPoint="0.0">
					0	35
					0.0246	-0.0013	-0.0015
					3.8255	-0.0013	-0.0015
					8.8576	-0.0013	-0.0015
					12.5805	-0.0013	-0.0014
					14.8288	-0.0012	-0.0011
					16.0115	-0.0011	-0.0009
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				</tableData>
				<tableData	breakPoint="0.19">
						0	35
					-0.0431	-0.0013	-0.0016
					4.2018	-0.0013	-0.0016
					7.2458	-0.0013	-0.0015
					10.5664	-0.0012	-0.0015
					12.6431	-0.0012	-0.0014
					15.9096	-0.0012	-0.0011
					15.9693	-0.0012	-0.0011
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				</tableData>
				<tableData	breakPoint="0.28">
					0	35
					0.0044	-0.0014	-0.0016
					3.6107	-0.0014	-0.0016
					7.0801	-0.0014	-0.0015
					10.4861	-0.0013	-0.0015
					13.3721	-0.0013	-0.0013
					15.9274	-0.0012	-0.0010
					15.9799	-0.0012	-0.0010
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			</tableData>
			</table>
			</product>
			<v>0</v>
			</ifthen>
		</function>

		<function name="aero/moment/Yaw_rudder_asym">
			<description>Yaw moment due to rudder asym</description>
			<ifthen>
			<eq><p>aero/function/thrust-state-sym</p><v>0</v></eq>
			<product>
				<property>aero/qbar-psf</property>
				<property>metrics/Sw-sqft</property>
				<property>metrics/bw-ft</property>
				<property>fcs/rudder-pos-deg</property>
				<table>
				<independentVar	lookup="row">aero/alpha-deg</independentVar>
				<independentVar	lookup="column">aero/function/power-balance</independentVar>
				<independentVar	lookup="table">fcs/flap-pos-deg</independentVar>
				<tableData	breakPoint="0">
						-1	1
					-0.028100	-0.001493	-0.001493
					5.660500	-0.001495	-0.001484
					8.057900	-0.001492	-0.001581
					10.073900	-0.001505	-0.001668
					12.700300	-0.001491	-0.001712
					14.979900	-0.001375	-0.001551
					16.015600	-0.001196	-0.001406
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				</tableData>
				<tableData	breakPoint="35">
						-1	1
					0.000300	-0.001493	-0.001493
					7.176000	-0.001438	-0.001485
					8.923900	-0.001228	-0.001444
					10.787000	-0.001057	-0.001369
					12.225000	-0.000993	-0.001278
					14.503100	-0.000989	-0.001067
					15.983200	-0.001004	-0.000800
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				</tableData>
				</table>
			</product>
			<v>0</v>
			</ifthen>
		</function>

		<function name="aero/moment/Yaw_aileron">
			<description>Adverse yaw</description>
			<product>
				<property>aero/qbar-psf</property>
				<property>metrics/Sw-sqft</property>
				<property>metrics/bw-ft</property>
				<property>fcs/aileron-pos-deg</property>
				<table>
					<independentVar	lookup="row">aero/alpha-deg</independentVar>
					<tableData>
						-0.0166	0.0000
						9.3688	0.0002
						15.9759	0.0004
						19.9942	0.0005
					</tableData>
				</table>
			</product>
		</function>
	</axis>
</aerodynamics>
