<?xml version="1.0" encoding="UTF-8"?>
<aerodynamics>
	<function name="propulsion/both-feathered">
		<and>
			<ge>
				<p>propulsion/engine[0]/feather-norm</p>
				<v>0.5</v>
			</ge>
			<ge>
				<p>propulsion/engine[1]/feather-norm</p>
				<value>0.5</value>
			</ge>
		</and>
	</function>

	<function name="propulsion/thrust-coefficient-sum">
		<sum>
			<p>propulsion/engine[0]/thrust-coefficient</p>
			<p>propulsion/engine[1]/thrust-coefficient</p>
		</sum>
	</function>

	<function name="propulsion/thrust-state">
		<ifthen>
			<p>propulsion/both-feathered</p>
			<v>-2</v>
			<ifthen>
				<eq>
					<sum>
						<p>propulsion/engine[0]/fuel-flow-rate-gph</p>
						<p>propulsion/engine[1]/fuel-flow-rate-gph</p>
					</sum>
					<v>0</v>
				</eq>
				<v>-1</v>
			  	<p>propulsion/thrust-coefficient-sum</p>
			</ifthen>
		</ifthen>
	</function>

	<function name="aero/function/kCLge">
		<description>Change in lift due to ground effect</description>
		<table>
			<independentVar>aero/h_b-mac-ft</independentVar>
			<tableData>
				0.0000	1.2030
				0.1000	1.1270
				0.1500	1.0900
				0.2000	1.0730
				0.3000	1.0460
				0.4000	1.0280
				0.5000	1.0190
				0.6000	1.0130
				0.7000	1.0080
				0.8000	1.0060
				0.9000	1.0030
				1.0000	1.0020
				1.1000	1.0000
			</tableData>
		</table>
	</function>

	<axis name="LIFT">
		<function name="aero/force/Lift_alpha">
			<description>Lift due to alpha</description>
			<product>
				<property>aero/qbar-psf</property>
				<property>metrics/Sw-sqft</property>
				<property>aero/function/kCLge</property>
			<table>
				<independentVar	lookup="row">aero/alpha-deg</independentVar>
				<independentVar	lookup="column">fcs/flap-pos-deg</independentVar>
				<independentVar	lookup="table">propulsion/thrust-state</independentVar>
				<tableData	breakPoint="-2">
					0	15	35
-4.0628	-0.3248	-0.0794	0.0301
-2.0555	-0.1407	0.1106	0.2235
-0.6496	-0.0086	0.2517	0.3636
1.9235	0.2425	0.4976	0.6190
3.3544	0.3771	0.6418	0.7616
4.4026	0.4771	0.7410	0.8586
6.1147	0.6447	0.9064	1.0268
8.0338	0.8226	1.0934	1.2143
9.4314	0.9550	1.2327	1.3526
11.3170	1.1468	1.3846	1.5386
12.3819	1.2333	1.4378	1.6365
14.4555	1.3389	1.4948	1.6355
16.0247	1.4003	1.5122	1.6336
18.2590	1.4711	1.4961	1.6070
19.1815	1.4141	1.4350	1.5468
20.1582	1.3386	1.3630	1.4638
21.0041	1.3234	1.3718	1.4126
23.3398	1.3363	1.3833	1.4168
24.4800	1.3507	1.3855	1.4275
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				</tableData>
				<tableData	breakPoint="-1">
					0	15	35
-4.1510	-0.3257	-0.1320	0.0862
-2.1350	-0.1250	0.0565	0.2735
-0.5860	0.0176	0.2040	0.4304
0.5960	0.1394	0.3287	0.5446
2.0470	0.2837	0.4706	0.6918
3.9000	0.4568	0.6546	0.8715
4.8880	0.5556	0.7561	0.9740
6.5150	0.7097	0.9145	1.1421
7.8790	0.8404	1.0482	1.2718
9.0280	0.9585	1.1654	1.3879
10.2880	1.0816	1.2900	1.5118
11.7780	1.2183	1.4311	1.6585
12.4010	1.2713	1.4687	1.6690
13.8060	1.3534	1.4901	1.6208
15.9970	1.4416	1.5270	1.6374
16.6320	1.4134	1.5109	1.6096
18.2140	1.3489	1.4213	1.4955
19.9330	1.3175	1.3589	1.4160
21.7900	1.3171	1.3415	1.4143
24.1090	1.3430	1.3515	1.4228
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				</tableData>
				<tableData	breakPoint="0">
					0	15	35
-4.359	-0.3864	-0.15362	0.10264
-4.11	-0.36224	-0.13127	0.11939
-4.091	-0.36044	-0.12961	0.12074
-3.748	-0.32724	-0.09885	0.14881
-3.384	-0.29204	-0.06576	0.18327
-3.142	-0.26863	-0.04336	0.20711
-2.78	-0.23391	-0.009	0.24242
-2.416	-0.19876	0.02785	0.27678
-2.173	-0.17502	0.05437	0.29912
-1.812	-0.13857	0.09521	0.33214
-1.569	-0.11262	0.12147	0.35457
-1.326	-0.0853	0.14503	0.3775
-0.844	-0.02952	0.1887	0.42575
-0.601	-0.00259	0.21118	0.45224
-0.088	0.04974	0.26034	0.50966
0.003	0.05834	0.26922	0.51937
0.971	0.14334	0.3671	0.61298
0.972	0.14342	0.3672	0.61307
1.578	0.19554	0.43478	0.6705
1.819	0.21759	0.46082	0.69434
1.939	0.22907	0.47278	0.70659
2.546	0.28916	0.53045	0.77147
2.786	0.31106	0.55434	0.79631
2.787	0.31114	0.55443	0.7964
3.514	0.37887	0.63531	0.86628
3.634	0.39188	0.64805	0.87795
3.754	0.40561	0.66017	0.88992
4.41	0.47975	0.72051	0.96143
<!--4.602	0.49803	0.73768	0.98354 -->
4.602	0.49811	0.73776	0.98365
5.449	0.57094	0.81861	1.07715
5.571	0.58161	0.83138	1.08945
5.572	0.5817	0.83148	1.08955
6.417	0.66324	0.92489	1.17077
6.418	0.66333	0.92499	1.17086
6.54	0.67531	0.9376	1.18269
7.385	0.75379	1.01852	1.26438
7.386	0.75388	1.01861	1.26447
7.508	0.76503	1.03001	1.27567
8.353	0.84584	1.11213	1.3541
8.354	0.84594	1.11222	1.35419
8.476	0.85864	1.12506	1.36689
9.2	0.93909	1.20184	1.44771
9.201	0.93919	1.20194	1.44781
9.323	0.95226	1.2138	1.46077
10.168	1.03443	1.29545	1.54133
10.169	1.03452	1.29555	1.54141
10.291	1.04587	1.30901	1.552
11.016	1.11321	1.38917	1.62036
11.136	1.12429	1.40006	1.63494
11.259	1.13558	1.41062	1.65167
12.105	1.21611	1.47888	1.71904
12.226	1.22899	1.48966	1.72075
12.227	1.2292	1.48983	1.72077
12.719	1.28654	1.52779	1.71884
13.074	1.32281	1.53629	1.71268
13.921	1.38391	1.55687	1.69025
14.243	1.40319	1.56759	1.68014
14.406	1.41252	1.5733	1.67522
14.768	1.43271	1.58628	1.6817
15.979	1.4944	1.62316	1.69612
<!-- 15.979	1.49442	1.62317	1.69613 -->
16.264	1.50617	1.62396	1.69608
16.761	1.5179	1.59417	1.6895
16.799	1.51852	1.59163	1.68845
17.189	1.52503	1.57367	1.66606
17.447	1.52903	1.56204	1.61005
17.638	1.53167	1.54738	1.58541
17.714	1.53263	1.53303	1.57825
17.828	1.53392	1.47733	1.56891
18.019	1.53552	1.46463	1.55597
18.591	1.53139	1.45603	1.53137
18.667	1.52869	1.4552	1.52928
19.087	1.4982	1.44996	1.5204
19.248	1.48335	1.44787	1.51778
19.468	1.46502	1.44516	1.51463
20.096	1.40855	1.43974	1.50735
<!-- 20.096	1.40853	1.43974	1.50734 -->
20.422	1.39005	1.43914	1.50412
21.527	1.39687	1.43918	1.49451
21.909	1.39985	1.43587	1.49142
22.032	1.40084	1.43441	1.49043
22.759	1.40069	1.42382	1.48451
23.001	1.39762	1.42019	1.48248
24.044	1.38195	1.40965	1.47272
24.159	1.38016	1.40882	1.47149
				</tableData>
				<tableData	breakPoint="0.19">
					0	15	35
-4.2710	-0.3983	-0.1201	0.1414
-3.4270	-0.3082	-0.0440	0.2156
-1.6190	-0.1147	0.1428	0.4135
0.5510	0.1201	0.3826	0.6526
1.7570	0.2529	0.5183	0.7815
3.6860	0.4668	0.7367	0.9863
5.0420	0.6149	0.8816	1.1436
6.4590	0.7653	1.0324	1.2970
8.3880	0.9691	1.2522	1.5018
9.5940	1.1028	1.3811	1.6412
11.1310	1.2831	1.5496	1.8092
12.3670	1.4063	1.6647	1.9239
13.9340	1.5839	1.7453	1.9483
15.5020	1.6626	1.8014	1.9638
16.6470	1.6858	1.8033	1.9680
18.3950	1.6617	1.7005	1.8530
19.6010	1.5983	1.6659	1.8130
19.9320	1.5829	1.6654	1.8046
21.1080	1.5921	1.6736	1.7762
22.6150	1.6241	1.6974	1.7678
23.9710	1.6558	1.6949	1.7614
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				</tableData>
				<tableData	breakPoint="0.28">
					0	15	35
-4.1640	-0.3983	-0.1287	0.1568
-3.5350	-0.3370	-0.0637	0.2257
-2.3310	-0.2030	0.0686	0.3605
-1.2480	-0.0690	0.2004	0.4952
-0.7610	-0.0144	0.2629	0.5433
0.4420	0.1203	0.4082	0.6802
2.3680	0.3370	0.6219	0.9086
3.5720	0.4718	0.7659	1.0430
4.7150	0.6123	0.9103	1.1696
6.0940	0.7602	1.0677	1.3387
7.2980	0.8865	1.2008	1.4734
8.5020	1.0198	1.3560	1.6082
9.5850	1.1405	1.4779	1.7429
10.7880	1.2765	1.6106	1.8776
11.9920	1.4246	1.7602	2.0123
12.9600	1.5320	1.8369	2.0760
14.4010	1.6885	1.8983	2.0944
16.4520	1.7546	1.9245	2.0552
17.7480	1.7224	1.8199	2.0087
19.3420	1.7132	1.8383	1.9421
20.6680	1.7221	1.8556	1.9362
22.1130	1.7636	1.8429	1.9655
23.9510	1.7618	1.8366	1.9768
24.1010	1.7610	1.8365	1.9772
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				</tableData>
			</table>
			</product>
		</function>
		<function name="aero/force/Lift_pitch_rate">
			<description>Lift due to pitch rate</description>
			<product>
				<property>aero/qbar-psf</property>
				<property>metrics/Sw-sqft</property>
				<property>velocities/q-aero-rad_sec</property>
				<property>aero/ci2vel</property>
				<table>
				<independentVar	lookup="row">aero/alpha-deg</independentVar>
				<tableData>
					-5	12.93
					0	13.1
					5	14.39
					10	14.11
				</tableData>
				</table>
			</product>
		</function>

		<function name="aero/force/Lift_alpha_rate">
			<description>Lift due to alpha rate</description>
			<product>
				<property>aero/qbar-psf</property>
				<property>metrics/Sw-sqft</property>
				<property>aero/alphadot-rad_sec</property>
				<property>aero/ci2vel</property>
				<value>5.3</value>
			</product>
		</function>

		<function name="aero/force/Lift_elevator">
			<description>Lift due to Elevator Deflection</description>
			<product>
				<property>aero/qbar-psf</property>
				<property>metrics/Sw-sqft</property>
			<table>
				<independentVar	lookup="row">aero/alpha-deg</independentVar>
				<independentVar	lookup="column">fcs/elevator-pos-deg</independentVar>
				<independentVar	lookup="table">propulsion/thrust-state</independentVar>
				<tableData	breakPoint="0">
					-13.5	-10	-5	0	5	10
-4.212	-0.144	-0.102	-0.061	0.000	0.113	0.148
-2.692	-0.160	-0.125	-0.076	0.000	0.090	0.140
-1.367	-0.156	-0.127	-0.063	0.000	0.094	0.135
0.348	-0.169	-0.123	-0.066	0.000	0.088	0.141
1.583	-0.151	-0.110	-0.051	0.000	0.093	0.152
3.134	-0.143	-0.105	-0.035	0.000	0.119	0.164
4.195	-0.147	-0.104	-0.046	0.000	0.095	0.156
5.487	-0.147	-0.098	-0.031	0.000	0.109	0.162
6.680	-0.150	-0.108	-0.035	0.000	0.120	0.157
8.247	-0.149	-0.101	-0.028	0.000	0.114	0.166
9.367	-0.161	-0.106	-0.047	0.000	0.105	0.159
10.650	-0.158	-0.107	-0.048	0.000	0.101	0.154
11.765	-0.156	-0.085	-0.038	0.000	0.090	0.152
13.079	-0.152	-0.102	-0.062	0.000	0.060	0.129
14.806	-0.148	-0.109	-0.062	0.000	0.047	0.107
16.965	-0.149	-0.128	-0.061	0.000	0.032	0.080
18.325	-0.140	-0.112	-0.068	0.000	0.028	0.071
19.420	-0.135	-0.112	-0.042	0.000	0.039	0.030
19.866	-0.184	-0.120	-0.064	0.000	0.044	0.017
20.935	-0.148	-0.135	-0.074	0.000	0.068	0.042
23.983	-0.071	-0.039	0.001	0.000	0.008	0.055
24.203	-0.059	-0.029	0.008	0.000	0.007	0.054
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				</tableData>
				<tableData	breakPoint="0.19">
					-13.5	-10	-5	0	5	10
-4.332	-0.155	-0.109	-0.045	0.000	0.117	0.157
-2.497	-0.175	-0.117	-0.046	0.000	0.112	0.155
-1.258	-0.188	-0.113	-0.048	0.000	0.115	0.159
0.178	-0.189	-0.119	-0.056	0.000	0.112	0.166
1.613	-0.193	-0.126	-0.060	0.000	0.111	0.167
2.811	-0.189	-0.118	-0.042	0.000	0.122	0.175
4.156	-0.202	-0.143	-0.057	0.000	0.116	0.174
5.388	-0.198	-0.132	-0.044	0.000	0.126	0.182
6.791	-0.206	-0.133	-0.039	0.000	0.114	0.180
8.211	-0.209	-0.146	-0.043	0.000	0.119	0.190
9.754	-0.196	-0.140	-0.041	0.000	0.129	0.194
11.006	-0.212	-0.144	-0.048	0.000	0.124	0.194
12.549	-0.209	-0.144	-0.036	0.000	0.121	0.195
13.651	-0.222	-0.144	-0.050	0.000	0.094	0.149
15.444	-0.227	-0.146	-0.079	0.000	0.055	0.074
16.768	-0.192	-0.103	-0.093	0.000	0.038	0.047
18.177	-0.135	-0.036	-0.104	0.000	0.027	0.043
19.227	-0.138	-0.034	-0.077	0.000	0.036	0.077
19.984	-0.147	-0.092	-0.044	0.000	0.054	0.102
21.606	-0.147	-0.111	-0.059	0.000	0.059	0.093
23.962	-0.087	-0.055	-0.045	0.000	0.074	0.111
24.019	-0.084	-0.053	-0.045	0.000	0.074	0.111
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				</tableData>
				<tableData	breakPoint="0.28">
					-13.5	-10	-5	0	5	10
-4.236	-0.191	-0.148	-0.063	0.000	0.136	0.200
-2.606	-0.193	-0.132	-0.059	0.000	0.098	0.196
-1.397	-0.203	-0.148	-0.070	0.000	0.093	0.190
0.188	-0.202	-0.149	-0.068	0.000	0.100	0.184
1.307	-0.202	-0.154	-0.063	0.000	0.089	0.190
2.948	-0.211	-0.152	-0.056	0.000	0.095	0.195
4.573	-0.204	-0.156	-0.056	0.000	0.097	0.194
5.702	-0.225	-0.157	-0.060	0.000	0.092	0.191
7.239	-0.209	-0.154	-0.046	0.000	0.110	0.197
8.915	-0.221	-0.145	-0.049	0.000	0.113	0.195
10.118	-0.227	-0.143	-0.051	0.000	0.116	0.202
11.327	-0.228	-0.153	-0.054	0.000	0.114	0.202
12.702	-0.234	-0.162	-0.072	0.000	0.108	0.188
13.787	-0.240	-0.160	-0.067	0.000	0.114	0.207
14.556	-0.232	-0.162	-0.063	0.000	0.107	0.199
15.572	-0.214	-0.156	-0.061	0.000	0.107	0.186
16.555	-0.209	-0.154	-0.066	0.000	0.090	0.168
17.471	-0.209	-0.137	-0.065	0.000	0.073	0.171
18.740	-0.215	-0.135	-0.074	0.000	0.046	0.154
19.985	-0.192	-0.145	-0.048	0.000	0.057	0.137
21.368	-0.213	-0.159	-0.101	0.000	0.042	0.097
22.321	-0.210	-0.137	-0.110	0.000	0.040	0.082
24.009	-0.127	-0.046	-0.026	0.000	0.062	0.084
24.077	-0.123	-0.042	-0.022	0.000	0.062	0.084
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				</tableData>
			</table>
			</product>
		</function>
	</axis>

	<axis name="DRAG">
		<function name="aero/force/Drag_alpha_flaps">
			<description>Drag due to alpha and flaps</description>
			<product>
				<property>aero/qbar-psf</property>
				<property>metrics/Sw-sqft</property>
			  <sum>
				<table>
				<independentVar	lookup="row">aero/alpha-deg</independentVar>
				<independentVar	lookup="column">fcs/flap-pos-deg</independentVar>
				<independentVar	lookup="table">propulsion/thrust-state</independentVar>
				<tableData	breakPoint="-2">
					0	15	35
-3.9119	0.0445	0.0812	0.1064
-3.9054	0.0445	0.0812	0.1064
-3.8708	0.0443	0.0811	0.1064
-2.0022	0.0349	0.0766	0.1062
-1.8417	0.0344	0.0765	0.1061
-1.7986	0.0342	0.0765	0.1061
0.0479	0.0324	0.0777	0.1060
0.0685	0.0325	0.0777	0.1061
0.1885	0.0325	0.0779	0.1063
2.0630	0.0344	0.0819	0.1137
2.1756	0.0347	0.0822	0.1143
2.2164	0.0348	0.0822	0.1145
4.0984	0.0423	0.0892	0.1264
4.1060	0.0423	0.0892	0.1265
4.2746	0.0432	0.0903	0.1281
5.8054	0.0523	0.1034	0.1444
6.1916	0.0552	0.1071	0.1481
6.2476	0.0556	0.1076	0.1486
7.8342	0.0707	0.1239	0.1653
8.1307	0.0738	0.1276	0.1694
8.1784	0.0743	0.1282	0.1701
9.7966	0.0925	0.1543	0.1980
10.1578	0.0969	0.1617	0.2050
10.2072	0.0976	0.1627	0.2060
11.4926	0.1160	0.1947	0.2341
12.1582	0.1275	0.2137	0.2515
12.1659	0.1276	0.2139	0.2517
13.3031	0.1507	0.2485	0.2849
14.0967	0.1699	0.2725	0.3095
14.1943	0.1725	0.2753	0.3126
15.4091	0.2081	0.3105	0.3512
16.1666	0.2326	0.3330	0.3752
16.1699	0.2327	0.3331	0.3753
17.7177	0.2839	0.3842	0.4242
17.8796	0.2893	0.3894	0.4293
18.2087	0.3002	0.3997	0.4396
19.7178	0.3507	0.4451	0.4876
20.0815	0.3632	0.4558	0.4994
20.0969	0.3638	0.4563	0.4999
21.6901	0.4203	0.5036	0.5522
21.8311	0.4253	0.5078	0.5568
22.0690	0.4336	0.5149	0.5646
23.7183	0.4893	0.5643	0.6176
23.9626	0.4974	0.5716	0.6254
24.1519	0.5036	0.5769	0.6314
24.2649	0.5073	0.5777	0.6350

				</tableData>
				<tableData	breakPoint="-1">
					0	15	35
-4.0240	0.0492	0.0852	0.1171
-4.0040	0.0492	0.0851	0.1171
-3.9830	0.0491	0.0851	0.1171
-2.3550	0.0443	0.0820	0.1179
-2.3440	0.0443	0.0820	0.1179
-1.9360	0.0435	0.0817	0.1182
-0.3990	0.0443	0.0814	0.1203
-0.2960	0.0446	0.0815	0.1206
-0.1310	0.0450	0.0816	0.1211
1.1180	0.0482	0.0849	0.1281
1.4150	0.0489	0.0863	0.1306
1.5930	0.0494	0.0871	0.1321
2.9040	0.0529	0.0946	0.1445
3.4450	0.0548	0.0983	0.1501
3.6270	0.0555	0.0997	0.1520
4.7820	0.0623	0.1094	0.1654
5.0770	0.0645	0.1122	0.1688
5.6000	0.0689	0.1173	0.1745
6.8470	0.0800	0.1306	0.1869
6.9250	0.0807	0.1315	0.1876
7.6350	0.0869	0.1400	0.1957
8.6810	0.0968	0.1545	0.2123
8.7600	0.0976	0.1557	0.2137
9.5810	0.1068	0.1686	0.2297
10.6740	0.1215	0.1871	0.2517
10.7790	0.1231	0.1891	0.2538
11.7260	0.1393	0.2099	0.2733
12.1770	0.1479	0.2202	0.2828
12.6320	0.1571	0.2306	0.2927
13.5920	0.1799	0.2532	0.3167
13.6010	0.1801	0.2535	0.3169
13.9850	0.1897	0.2630	0.3273
15.1710	0.2204	0.2961	0.3609
15.5220	0.2303	0.3067	0.3714
15.8750	0.2406	0.3176	0.3823
16.6280	0.2635	0.3404	0.4064
17.6940	0.2967	0.3727	0.4412
17.7970	0.3000	0.3759	0.4446
18.0850	0.3092	0.3849	0.4540
19.3480	0.3521	0.4254	0.4949
19.6370	0.3626	0.4349	0.5044
19.6480	0.3630	0.4352	0.5047
20.7250	0.4058	0.4720	0.5405
21.0240	0.4176	0.4825	0.5507
21.8520	0.4498	0.5122	0.5796
22.3420	0.4694	0.5300	0.5974
23.9910	0.5393	0.5901	0.6598
24.0370	0.5413	0.5918	0.6615
24.0890	0.5436	0.5937	0.6635

				</tableData>
				<tableData	breakPoint="0">
					0	15	35
-3.9330	0.0454	0.0713	0.1033
-2.2089	0.0389	0.0712	0.1020
-0.5998	0.0339	0.0732	0.1074
1.6998	0.0351	0.0770	0.1207
3.4237	0.0393	0.0850	0.1361
4.8601	0.0457	0.0940	0.1504
7.2748	0.0592	0.1164	0.1783
8.7681	0.0707	0.1359	0.2021
10.1479	0.0869	0.1539	0.2219
12.5036	0.1201	0.1991	0.2675
13.7109	0.1423	0.2262	0.2943
14.9184	0.1693	0.2567	0.3254
16.8715	0.2210	0.3105	0.3829
18.0202	0.2571	0.3451	0.4173
18.9983	0.2881	0.3762	0.4483
20.8945	0.3536	0.4383	0.5129
22.1006	0.3999	0.4810	0.5542
23.4227	0.4552	0.5263	0.5996
24.1084	0.4889	0.5527	0.6253
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				</tableData>
				<tableData	breakPoint="0.19">
					0	15	35
-3.9821	0.1292	0.1618	0.1905
-2.1152	0.1197	0.1593	0.1893
-0.1880	0.1133	0.1591	0.1932
1.8579	0.1123	0.1636	0.2058
3.8457	0.1155	0.1744	0.2271
5.2908	0.1229	0.1839	0.2430
7.6403	0.1364	0.2057	0.2780
9.0835	0.1481	0.2255	0.3016
10.5287	0.1632	0.2505	0.3300
12.6391	0.2006	0.2956	0.3816
13.8425	0.2272	0.3308	0.4134
15.6507	0.2793	0.3867	0.4663
17.0350	0.3191	0.4306	0.5110
18.5996	0.3703	0.4863	0.5616
20.5272	0.4400	0.5579	0.6357
21.4939	0.4759	0.5936	0.6716
22.5771	0.5210	0.6358	0.7136
24.0165	0.5836	0.6900	0.7653
24.0696	0.5861	0.6922	0.7673
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				</tableData>
				<tableData	breakPoint="0.28">
					0	15	35
-3.9979	0.3230	0.3636	0.4050
-2.3830	0.3205	0.3640	0.4083
-0.9167	0.3157	0.3620	0.4130
0.6106	0.3133	0.3610	0.4219
2.1379	0.3133	0.3648	0.4366
3.6652	0.3157	0.3739	0.4514
5.1314	0.3205	0.3860	0.4713
6.6570	0.3277	0.3979	0.4888
8.0619	0.3369	0.4182	0.5105
9.4057	0.3480	0.4431	0.5297
10.9946	0.3710	0.4768	0.5541
12.2162	0.3914	0.5081	0.5815
13.4377	0.4197	0.5417	0.6148
13.9873	0.4347	0.5586	0.6309
15.1477	0.4708	0.5970	0.6709
16.2470	0.5125	0.6379	0.7124
17.3462	0.5530	0.6812	0.7558
18.3843	0.5923	0.7221	0.7993
19.7270	0.6485	0.7755	0.8567
20.7652	0.6929	0.8233	0.9000
21.8033	0.7381	0.8742	0.9457
23.3931	0.8014	0.9486	1.0160
24.1060	0.8326	0.9818	1.0473
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				</tableData>
				</table>

				<!--
				Wind tunnel data includes gear drag at flaps 15+.
				Subtracting that out to avoid double-dipping.
				-->
				<table>
				<independentVar>fcs/flap-pos-deg</independentVar>
				<tableData>
				0	0
				15	-0.02
				</tableData>
				</table>
			  </sum>
			</product>
		</function>

<!--- #########################################  -->
<!--- ###########  work in progress  ##########  -->
<!--- #########################################  -->

		<function name="aero/force/Drag_beta">
			<description>Drag due to sideslip</description>
			<product>
				<property>aero/qbar-psf</property>
				<property>metrics/Sw-sqft</property>
				<table>
					<independentVar lookup="row">aero/beta-rad</independentVar>
					<tableData>
						-1.57	1.23
						-0.26	0.05
						0		0
						0.26	0.05
						1.57	1.23
					</tableData>
				</table>
			</product>
		</function>

		<function name="aero/force/Drag_elevator">
			<description>Drag due to Elevator Deflection</description>
			<product>
				<property>aero/qbar-psf</property>
				<property>metrics/Sw-sqft</property>
				<abs>
					<property>fcs/elevator-pos-rad</property>
				</abs>
				<value>0.04</value>
			</product>
		</function>

		<function name="aero/force/Drag_gear">
			<description>Drag due to gear</description>
			<product>
				<property>aero/qbar-psf</property>
				<property>metrics/Sw-sqft</property>
				<property>gear/gear-pos-norm</property>
				<value>0.02</value>
			</product>
		</function>

		<function name="aero/force/Drag_landing_light[0]">
			<description>Drag due to left landing light</description>
			<product>
				<property>aero/qbar-psf</property>
				<sin>
					<toradians>
						<property>/sim/model/lights/landing[0]/pos-deg</property>
					</toradians>
				</sin>
				<!-- drag coefficient of a half sphere with the flat side forward -->
				<value>1.17</value>
				<pow>
					<!-- radius of the landing light -->
					<value>0.3</value>
					<value>2</value>
				</pow>
			</product>
		</function>

		<function name="aero/force/Drag_landing_light[1]">
			<description>Drag due to right landing light</description>
			<product>
				<property>aero/qbar-psf</property>
				<sin>
					<toradians>
						<property>/sim/model/lights/landing[1]/pos-deg</property>
					</toradians>
				</sin>
				<!-- drag coefficient of a half sphere with the flat side forward -->
				<value>1.17</value>
				<pow>
					<!-- radius of the landing light -->
					<value>0.3</value>
					<value>2</value>
				</pow>
			</product>
		</function>
	</axis>

	<axis name="SIDE">
		<function name="aero/force/Side_beta">
			<description>Side force due to beta</description>
			<product>
				<property>aero/qbar-psf</property>
				<property>metrics/Sw-sqft</property>
				<property>aero/beta-rad</property>
				<table>
					<independentVar>aero/alpha-deg</independentVar>
					<tableData>
						0	-0.698
						5	-0.610
						6.6	-0.577
					</tableData>
				</table>
			</product>
		</function>

		<function name="aero/force/Side_roll_rate">
			<description>Side force due to roll rate</description>
			<product>
				<property>aero/qbar-psf</property>
				<property>metrics/Sw-sqft</property>
				<property>aero/bi2vel</property>
				<property>velocities/p-aero-rad_sec</property>
				<table>
					<independentVar lookup="row">aero/alpha-deg</independentVar>
					<tableData>
						0	-0.141
						5	-0.2093
						6.6	-0.2897
					</tableData>
				</table>
			</product>
		</function>

		<function name="aero/force/Side_yaw_rate">
			<description>Side force due to yaw rate</description>
			<product>
				<property>aero/qbar-psf</property>
				<property>metrics/Sw-sqft</property>
				<property>aero/bi2vel</property>
				<property>velocities/r-aero-rad_sec</property>
				<value>0.355</value>
			</product>
		</function>

		<function name="aero/force/Side_rudder">
			<description>Side force due to rudder</description>
			<product>
				<property>aero/qbar-psf</property>
				<property>metrics/Sw-sqft</property>
				<property>fcs/rudder-pos-rad</property>
				<value>0.23</value>
			</product>
		</function>
	</axis>

	<axis name="PITCH">
		<function name="aero/moment/Pitch_base">
			<description>Pitch moment due to alpha,flaps</description>
			<product>
				<property>aero/qbar-psf</property>
				<property>metrics/Sw-sqft</property>
				<property>metrics/cbarw-ft</property>
				<table>
					<independentVar lookup="row">aero/alpha-deg</independentVar>
					<independentVar lookup="column">fcs/flap-pos-deg</independentVar>
					<tableData>

					0	15	35
				-4.119	0.173	0.214	0.281
				-4.081	0.172	0.213	0.281
				-4.057	0.172	0.212	0.280
				-2.609	0.143	0.180	0.251
				-2.477	0.140	0.177	0.248
				-1.882	0.127	0.163	0.235
				-0.550	0.095	0.135	0.206
				-0.445	0.093	0.133	0.204
				-0.073	0.086	0.125	0.196
				1.482	0.061	0.093	0.165
				1.958	0.052	0.081	0.155
				2.867	0.032	0.058	0.135
				3.459	0.016	0.042	0.120
				4.130	-0.001	0.026	0.102
				5.317	-0.031	-0.002	0.072
				5.575	-0.038	-0.008	0.068
				7.071	-0.074	-0.047	0.036
				7.078	-0.074	-0.047	0.036
				7.415	-0.081	-0.055	0.025
				9.362	-0.123	-0.112	-0.046
				9.864	-0.135	-0.131	-0.065
				10.945	-0.166	-0.175	-0.107
				11.787	-0.194	-0.211	-0.142
				12.067	-0.204	-0.223	-0.154
				12.954	-0.241	-0.262	-0.198
				13.295	-0.258	-0.284	-0.218
				13.404	-0.264	-0.293	-0.224
				14.695	-0.346	-0.406	-0.303
				14.937	-0.362	-0.424	-0.317
				15.220	-0.381	-0.443	-0.335
				16.706	-0.472	-0.528	-0.423
				17.004	-0.489	-0.543	-0.440
				17.399	-0.512	-0.560	-0.462
				18.770	-0.579	-0.616	-0.535
				18.958	-0.587	-0.623	-0.545
				19.241	-0.599	-0.634	-0.558
				21.028	-0.676	-0.698	-0.637
				21.050	-0.677	-0.699	-0.638
				22.002	-0.716	-0.729	-0.675
				23.893	-0.788	-0.786	-0.747
				23.953	-0.790	-0.788	-0.749
				24.008	-0.792	-0.790	-0.751
					</tableData>
				</table>
			</product>
		</function>

		<function name="aero/moment/Pitch_elevator">
			<description>Pitch moment due to elevator</description>
			<product>
				<property>aero/qbar-psf</property>
				<property>metrics/Sw-sqft</property>
				<property>metrics/cbarw-ft</property>
				<property>fcs/elevator-pos-rad</property>
				<value>-2.26</value>
			</product>
		</function>

		<function name="aero/moment/Pitch_damp">
			<description>Pitch moment due to pitch rate</description>
			<product>
				<property>aero/qbar-psf</property>
				<property>metrics/Sw-sqft</property>
				<property>metrics/cbarw-ft</property>
				<property>aero/ci2vel</property>
				<property>velocities/q-aero-rad_sec</property>
				<value>-26.3</value>
			</product>
		</function>

		<function name="aero/moment/Pitch_alphadot">
			<description>Pitch moment due to alpha rate</description>
			<product>
				<property>aero/qbar-psf</property>
				<property>metrics/Sw-sqft</property>
				<property>metrics/cbarw-ft</property>
				<property>aero/ci2vel</property>
				<property>aero/alphadot-rad_sec</property>
				<value>-12.7</value>
			</product>
		</function>
	</axis>

	<axis name="ROLL">
		<function name="aero/moment/Roll_beta">
			<description>Roll moment due to beta</description>
			<product>
				<property>aero/qbar-psf</property>
				<property>metrics/Sw-sqft</property>
				<property>metrics/bw-ft</property>
				<property>aero/beta-rad</property>
				<value>-0.1096</value>
			</product>
		</function>

		<function name="aero/moment/Roll_damp">
			<description>Roll moment due to roll rate</description>
			<product>
				<property>aero/qbar-psf</property>
				<property>metrics/Sw-sqft</property>
				<property>metrics/bw-ft</property>
				<property>aero/bi2vel</property>
				<property>velocities/p-aero-rad_sec</property>
				<value>-0.551</value>
			</product>
		</function>

		<function name="aero/moment/Roll_yaw">
			<description>Roll moment due to yaw rate</description>
			<product>
				<property>aero/qbar-psf</property>
				<property>metrics/Sw-sqft</property>
				<property>metrics/bw-ft</property>
				<property>aero/bi2vel</property>
				<property>velocities/r-aero-rad_sec</property>
				<table>
					<independentVar lookup="row">aero/alpha-deg</independentVar>
					<tableData>
						0	0.0729
						5	0.1746
						6.6	0.2433
					</tableData>
				</table>
			</product>
		</function>

		<function name="aero/moment/Roll_aileron">
			<description>Roll moment due to aileron</description>
			<product>
				<property>aero/qbar-psf</property>
				<property>metrics/Sw-sqft</property>
				<property>metrics/bw-ft</property>
				<property>fcs/left-aileron-pos-rad</property>
				<value>0.172</value>
			</product>
		</function>

		<function name="aero/moment/Roll_rudder">
			<description>Roll moment due to rudder</description>
			<product>
				<property>aero/qbar-psf</property>
				<property>metrics/Sw-sqft</property>
				<property>metrics/bw-ft</property>
				<property>fcs/rudder-pos-rad</property>
				<value>0.0192</value>
			</product>
		</function>
	</axis>

	<axis name="YAW">
		<!-- Stall initiator -->
		<!--<function name="aero/moment/Yaw_alpha">
			<description>Yaw moment due to alpha</description>
			<product>
				<property>aero/qbar-psf</property>
				<property>metrics/Sw-sqft</property>
				<property>metrics/bw-ft</property>
				<property>aero/alpha-rad</property>
				<table>
					<independentVar lookup="row">aero/beta-rad</independentVar>
					<independentVar lookup="column">aero/Re</independentVar>
					<tableData>
									3187609     3506370
						-0.3491		-1			0
						0.3491		1			0
					</tableData>
				</table>
			</product>
		</function>-->

		<function name="aero/moment/Yaw_beta">
			<description>Yaw moment due to beta</description>
			<product>
				<property>aero/qbar-psf</property>
				<property>metrics/Sw-sqft</property>
				<property>metrics/bw-ft</property>
				<property>aero/beta-rad</property>
				<value>0.1444</value>
			</product>
		</function>

		<function name="aero/moment/Yaw_roll_rate">
			<description>Yaw moment due to roll rate</description>
			<product>
				<property>aero/qbar-psf</property>
				<property>metrics/Sw-sqft</property>
				<property>metrics/bw-ft</property>
				<property>aero/bi2vel</property>
				<property>velocities/p-rad_sec</property>
				<table>
					<independentVar lookup="row">aero/alpha-deg</independentVar>
					<tableData>
						0	-0.02517
						5	-0.0615
						6.6	-0.1021
					</tableData>
				</table>
			</product>
		</function>

		<function name="aero/moment/Yaw_damp">
			<description>Yaw moment due to yaw rate</description>
			<product>
				<property>aero/qbar-psf</property>
				<property>metrics/Sw-sqft</property>
				<property>metrics/bw-ft</property>
				<property>aero/bi2vel</property>
				<property>velocities/r-aero-rad_sec</property>
				<value>-0.1495</value>
			</product>
		</function>

		<function name="aero/moment/Yaw_rudder">
			<description>Yaw moment due to rudder</description>
			<product>
				<property>aero/qbar-psf</property>
				<property>metrics/Sw-sqft</property>
				<property>metrics/bw-ft</property>
				<property>fcs/rudder-pos-rad</property>
				<value>-0.1152</value>
			</product>
		</function>

		<function name="aero/moment/Yaw_aileron">
			<description>Adverse yaw</description>
			<product>
				<property>aero/qbar-psf</property>
				<property>metrics/Sw-sqft</property>
				<property>metrics/bw-ft</property>
				<property>fcs/left-aileron-pos-rad</property>
				<table>
					<independentVar lookup="row">aero/alpha-deg</independentVar>
					<tableData>
						0	-0.0168
						5	-0.0402
						6.6	-0.0676
					</tableData>
				</table>
			</product>
		</function>
	</axis>
</aerodynamics>
